Simulations: Version=20
  Replacements
    Report: EventNames=[Clock].DoReport
      VariableNames:
        [Clock].Today
        [Wheat].Stem.NRetranslocationFactor
        [Wheat].Grain.Allocated.StructuralN
        [Wheat].Root.Allocated.StructuralN
        [Wheat].Leaf.Allocated.StructuralN
        [Wheat].Spike.Allocated.StructuralN
        [Wheat].Stem.Allocated.StructuralN
        [Wheat].Grain.Allocated.StorageN
        [Wheat].Root.Allocated.StorageN
        [Wheat].Leaf.Allocated.StorageN
        [Wheat].Spike.Allocated.StorageN
        [Wheat].Stem.Allocated.StorageN
        [Wheat].Grain.Allocated.MetabolicN
        [Wheat].Root.Allocated.MetabolicN
        [Wheat].Leaf.Allocated.MetabolicN
        [Wheat].Spike.Allocated.MetabolicN
        [Wheat].Stem.Allocated.MetabolicN
        [Wheat].Grain.Allocated.StructuralN + [Wheat].Grain.Allocated.StorageN + [Wheat].Grain.Allocated.MetabolicN as Wheat.Grain.AllocatedN
        [Wheat].Leaf.Allocated.StructuralN + [Wheat].Leaf.Allocated.StorageN + [Wheat].Leaf.Allocated.MetabolicN as Wheat.Leaf.AllocatedN
        [Wheat].Root.Allocated.StructuralN + [Wheat].Root.Allocated.StorageN + [Wheat].Root.Allocated.MetabolicN as Wheat.Root.AllocatedN
        [Wheat].Spike.Allocated.StructuralN + [Wheat].Spike.Allocated.StorageN + [Wheat].Spike.Allocated.MetabolicN as Wheat.Spike.AllocatedN
        [Wheat].Stem.Allocated.StructuralN + [Wheat].Stem.Allocated.StorageN + [Wheat].Stem.Allocated.MetabolicN as Wheat.Stem.AllocatedN
        [Wheat].Grain.Allocated.StructuralN + [Wheat].Grain.Allocated.StorageN + [Wheat].Grain.Allocated.MetabolicN + [Wheat].Leaf.Allocated.StructuralN + [Wheat].Leaf.Allocated.StorageN + [Wheat].Leaf.Allocated.MetabolicN + [Wheat].Root.Allocated.StructuralN + [Wheat].Root.Allocated.StorageN + [Wheat].Root.Allocated.MetabolicN + [Wheat].Spike.Allocated.StructuralN + [Wheat].Spike.Allocated.StorageN + [Wheat].Spike.Allocated.MetabolicN + [Wheat].Stem.Allocated.StructuralN + [Wheat].Stem.Allocated.StorageN + [Wheat].Stem.Allocated.MetabolicN as Wheat.AllocatedN
        [Wheat].Spike.StructuralFraction.Value() as Wheat.Spike.StructuralFraction
        [Wheat].Stem.StructuralFraction.Value() as Wheat.Stem.StructuralFraction
        [Wheat].Grain.StructuralFraction.Value() as Wheat.Grain.StructuralFraction
        [Wheat].Leaf.StructuralFraction.Value() as Wheat.Leaf.StructuralFraction
        [Wheat].Root.StructuralFraction.Value() as Wheat.Root.StructuralFraction
        [Wheat].Leaf.CohortParameters.MinimumNConc.Value() as Wheat.Leaf.MinimumNConc
        [Wheat].Leaf.CohortParameters.CriticalNConc.Value() as Wheat.Leaf.CriticalNConc
        [Wheat].Leaf.CohortParameters.MaximumNConc.Value() as Wheat.Leaf.MaximumNConc
        [Wheat].Stem.MinimumNConc.Value() as Wheat.Stem.MinimumNConc
        [Wheat].Stem.CriticalNConc.Value() as Wheat.Stem.CriticalNConc
        [Wheat].Stem.MaximumNConc.Value() as Wheat.Stem.MaximumNConc
        [Wheat].Spike.MinimumNConc.Value() as Wheat.Spike.MinimumNConc
        [Wheat].Spike.CriticalNConc.Value() as Wheat.Spike.CriticalNConc
        [Wheat].Spike.MaximumNConc.Value() as Wheat.Spike.MaximumNConc
        [Wheat].Root.MinimumNConc.Value() as Wheat.Root.MinimumNConc
        [Wheat].Root.CriticalNConc.Value() as Wheat.Root.CriticalNConc
        [Wheat].Root.MaximumNConc.Value() as Wheat.Root.MaximumNConc
        [Wheat].Grain.MinimumNConc.Value() as Wheat.Grain.MinimumNConc
        [Wheat].Grain.CriticalNConc.Value() as Wheat.Grain.CriticalNConc
        [Wheat].Grain.MaximumNConc.Value() as Wheat.Grain.MaximumNConc
        [Wheat].Stem.Live.StorageWt + [Wheat].Stem.Dead.StorageWt as Wheat.Stem.StorageWt
        [Wheat].Stem.Live.StructuralWt + [Wheat].Stem.Dead.StructuralWt as Wheat.Stem.StructuralWt
        [Wheat].Stem.Live.MetabolicWt + [Wheat].Stem.Dead.MetabolicWt as Wheat.Stem.MetabolicWt
        [Wheat].Spike.Live.StorageWt + [Wheat].Spike.Dead.StorageWt as Wheat.Spike.StorageWt
        [Wheat].Spike.Live.StructuralWt + [Wheat].Spike.Dead.StructuralWt as Wheat.Spike.StructuralWt
        [Wheat].Spike.Live.MetabolicWt + [Wheat].Spike.Dead.MetabolicWt as Wheat.Spike.MetabolicWt
        [Wheat].Arbitrator.N.TotalUptakeSupply
        [Weather].MaxT
        [Weather].MinT
        [Weather].MeanT
        [Weather].Radn
        [Weather].Rain
        [Wheat].Root.WaterUptake
        [Wheat].Root.NUptake
        [Wheat].Root.NSupplyUptake
        [Wheat].Root.NSupply.Uptake
        [Wheat].Leaf.NSupply.Uptake
        [Wheat].Stem.NSupply.Uptake
        [Wheat].Grain.NSupply.Uptake
        [Wheat].Spike.NSupply.Uptake
        [Wheat].Root.NSupply.Uptake + [Wheat].Leaf.NSupply.Uptake + [Wheat].Stem.NSupply.Uptake + [Wheat].Grain.NSupply.Uptake + [Wheat].Spike.NSupply.Uptake as Wheat.NSupply.Uptake
        [Wheat].Total.N
        [Wheat].Total.StorageN
        [Wheat].Total.StructuralN
        [Wheat].Total.MetabolicN
        [Wheat].Spike.HeadNumber
        [Wheat].Leaf.DeltaPotentialArea
        [Wheat].Leaf.DeltaStressConstrainedArea
        [Wheat].Leaf.DeltaCarbonConstrainedArea
        [Wheat].Spike.Nconc
        [Wheat].Leaf.Nconc
        [Wheat].Stem.Nconc
        [Wheat].Root.Nconc
        [Wheat].Grain.Nconc
        [Wheat].Total.NConc
        [Wheat].Leaf.N
        [Wheat].Leaf.Live.MetabolicN + [Wheat].Leaf.Dead.MetabolicN as Wheat.Leaf.MetabolicN
        [Wheat].Leaf.Live.StorageN + [Wheat].Leaf.Dead.StorageN as Wheat.Leaf.StorageN
        [Wheat].Leaf.Live.StructuralN + [Wheat].Leaf.Dead.StructuralN  as Wheat.Leaf.StructuralN
        [Wheat].Grain.Live.MetabolicN + [Wheat].Grain.Dead.MetabolicN as Wheat.Grain.MetabolicN
        [Wheat].Grain.Live.StorageN + [Wheat].Grain.Dead.StorageN as Wheat.Grain.StorageN
        [Wheat].Grain.Live.StructuralN + [Wheat].Grain.Dead.StructuralN  as Wheat.Grain.StructuralN
        [Wheat].Stem.Live.MetabolicN + [Wheat].Stem.Dead.MetabolicN as Wheat.Stem.MetabolicN
        [Wheat].Stem.Live.StorageN + [Wheat].Stem.Dead.StorageN as Wheat.Stem.StorageN
        [Wheat].Stem.Live.StructuralN + [Wheat].Stem.Dead.StructuralN  as Wheat.Stem.StructuralN
        [Wheat].Spike.Live.MetabolicN + [Wheat].Spike.Dead.MetabolicN as Wheat.Spike.MetabolicN
        [Wheat].Spike.Live.StorageN + [Wheat].Spike.Dead.StorageN as Wheat.Spike.StorageN
        [Wheat].Spike.Live.StructuralN + [Wheat].Spike.Dead.StructuralN  as Wheat.Spike.StructuralN
        [Wheat].Root.Live.MetabolicN + [Wheat].Root.Dead.MetabolicN as Wheat.Root.MetabolicN
        [Wheat].Root.Live.StorageN + [Wheat].Root.Dead.StorageN as Wheat.Root.StorageN
        [Wheat].Root.Live.StructuralN + [Wheat].Root.Dead.StructuralN  as Wheat.Root.StructuralN
        [Wheat].Leaf.Live.N
        [Wheat].Leaf.Dead.N
        [Wheat].Leaf.Live.NConc
        [Wheat].Leaf.Dead.NConc
        [Wheat].Leaf.Live.MetabolicN
        [Wheat].Leaf.Live.MetabolicNConc
        [Wheat].Leaf.Live.StorageN
        [Wheat].Leaf.Live.StorageNConc
        [Wheat].Leaf.Live.StructuralN
        [Wheat].Leaf.Live.StructuralNConc
        [Wheat].Leaf.Dead.MetabolicN
        [Wheat].Leaf.Dead.MetabolicNConc
        [Wheat].Leaf.Dead.StorageN
        [Wheat].Leaf.Dead.StorageNConc
        [Wheat].Leaf.Dead.StructuralN
        [Wheat].Leaf.Dead.StructuralNConc
        [Wheat].Spike.N
        [Wheat].Spike.Live.N
        [Wheat].Spike.Dead.N
        [Wheat].Spike.Live.NConc
        [Wheat].Spike.Dead.NConc
        [Wheat].Spike.Live.MetabolicN
        [Wheat].Spike.Live.MetabolicNConc
        [Wheat].Spike.Live.StorageN
        [Wheat].Spike.Live.StorageNConc
        [Wheat].Spike.Live.StructuralN
        [Wheat].Spike.Live.StructuralNConc
        [Wheat].Spike.Dead.MetabolicN
        [Wheat].Spike.Dead.MetabolicNConc
        [Wheat].Spike.Dead.StorageN
        [Wheat].Spike.Dead.StorageNConc
        [Wheat].Spike.Dead.StructuralN
        [Wheat].Spike.Dead.StructuralNConc
        [Wheat].Stem.N
        [Wheat].Stem.Live.N
        [Wheat].Stem.Dead.N
        [Wheat].Stem.Live.NConc
        [Wheat].Stem.Dead.NConc
        [Wheat].Stem.Live.MetabolicN
        [Wheat].Stem.Live.MetabolicNConc
        [Wheat].Stem.Live.StorageN
        [Wheat].Stem.Live.StorageNConc
        [Wheat].Stem.Live.StructuralN
        [Wheat].Stem.Live.StructuralNConc
        [Wheat].Stem.Dead.MetabolicN
        [Wheat].Stem.Dead.MetabolicNConc
        [Wheat].Stem.Dead.StorageN
        [Wheat].Stem.Dead.StorageNConc
        [Wheat].Stem.Dead.StructuralN
        [Wheat].Stem.Dead.StructuralNConc
        [Wheat].Root.N
        [Wheat].Root.Live.N
        [Wheat].Root.Dead.N
        [Wheat].Root.Live.NConc
        [Wheat].Root.Dead.NConc
        [Wheat].Root.Live.MetabolicN
        [Wheat].Root.Live.MetabolicNConc
        [Wheat].Root.Live.StorageN
        [Wheat].Root.Live.StorageNConc
        [Wheat].Root.Live.StructuralN
        [Wheat].Root.Live.StructuralNConc
        [Wheat].Root.Dead.MetabolicN
        [Wheat].Root.Dead.MetabolicNConc
        [Wheat].Root.Dead.StorageN
        [Wheat].Root.Dead.StorageNConc
        [Wheat].Root.Dead.StructuralN
        [Wheat].Root.Dead.StructuralNConc
        [Wheat].Root.Detached.N
        [Wheat].Root.Detached.NConc
        [Wheat].Root.Detached.MetabolicN
        [Wheat].Root.Detached.MetabolicNConc
        [Wheat].Root.Detached.StorageN
        [Wheat].Root.Detached.StorageNConc
        [Wheat].Root.Detached.StructuralN
        [Wheat].Root.Detached.StructuralNConc
        [Wheat].Grain.N
        [Wheat].Grain.Live.N
        [Wheat].Grain.Dead.N
        [Wheat].Grain.Live.NConc
        [Wheat].Grain.Dead.NConc
        [Wheat].Grain.Live.MetabolicN
        [Wheat].Grain.Live.MetabolicNConc
        [Wheat].Grain.Live.StorageN
        [Wheat].Grain.Live.StorageNConc
        [Wheat].Grain.Live.StructuralN
        [Wheat].Grain.Live.StructuralNConc
        [Wheat].Grain.Dead.MetabolicN
        [Wheat].Grain.Dead.MetabolicNConc
        [Wheat].Grain.Dead.StorageN
        [Wheat].Grain.Dead.StorageNConc
        [Wheat].Grain.Dead.StructuralN
        [Wheat].Grain.Dead.StructuralNConc
        [Wheat].Leaf.SpecificLeafNitrogen
        [Wheat].Leaf.Photosynthesis_RUE.Value() as Wheat.Leaf.Photosynthesis_RUE
        [Wheat].Leaf.Photosynthesis_SPASS.Value() as Wheat.Leaf.Photosynthesis_SPASS
        [Wheat].Leaf.Photosynthesis_DCaPS.Value() as Wheat.Leaf.Photosynthesis_DCaPS
        [Wheat].Grain.NDemand.Metabolic
        [Wheat].Grain.NDemand.Structural
        [Wheat].Grain.NDemand.Storage
        [Wheat].Leaf.NDemand.Metabolic
        [Wheat].Leaf.NDemand.Structural
        [Wheat].Leaf.NDemand.Storage
        [Wheat].Root.NDemand.Metabolic
        [Wheat].Root.NDemand.Structural
        [Wheat].Root.NDemand.Storage
        [Wheat].Spike.NDemand.Metabolic
        [Wheat].Spike.NDemand.Structural
        [Wheat].Spike.NDemand.Storage
        [Wheat].Stem.NDemand.Metabolic
        [Wheat].Stem.NDemand.Structural
        [Wheat].Stem.NDemand.Storage
        [Wheat].Grain.NDemand.Metabolic + [Wheat].Grain.NDemand.Structural + [Wheat].Grain.NDemand.Storage as Wheat.Grain.NDemand.Total
        [Wheat].Leaf.NDemand.Metabolic + [Wheat].Leaf.NDemand.Structural + [Wheat].Leaf.NDemand.Storage as Wheat.Leaf.NDemand.Total
        [Wheat].Root.NDemand.Metabolic + [Wheat].Root.NDemand.Structural + [Wheat].Root.NDemand.Storage as Wheat.Root.NDemand.Total
        [Wheat].Spike.NDemand.Metabolic + [Wheat].Spike.NDemand.Structural + [Wheat].Spike.NDemand.Storage as Wheat.Spike.NDemand.Total
        [Wheat].Stem.NDemand.Metabolic + [Wheat].Stem.NDemand.Structural + [Wheat].Stem.NDemand.Storage as Wheat.Stem.NDemand.Total
        [Wheat].Grain.NDemand.Metabolic + [Wheat].Leaf.NDemand.Metabolic + [Wheat].Root.NDemand.Metabolic + [Wheat].Spike.NDemand.Metabolic + [Wheat].Stem.NDemand.Metabolic as Wheat.NDemand.Metabolic
        [Wheat].Grain.NDemand.Storage + [Wheat].Leaf.NDemand.Storage + [Wheat].Root.NDemand.Storage + [Wheat].Spike.NDemand.Storage + [Wheat].Stem.NDemand.Storage as Wheat.NDemand.Storage
        [Wheat].Grain.NDemand.Structural + [Wheat].Leaf.NDemand.Structural + [Wheat].Root.NDemand.Structural + [Wheat].Spike.NDemand.Structural + [Wheat].Stem.NDemand.Structural as Wheat.NDemand.Structural
        [Wheat].Grain.NSupply.Fixation
        [Wheat].Grain.NSupply.Retranslocation
        [Wheat].Grain.NSupply.Reallocation
        [Wheat].Leaf.NSupply.Fixation
        [Wheat].Leaf.NSupply.Retranslocation
        [Wheat].Leaf.NSupply.Reallocation
        [Wheat].Root.NSupply.Fixation
        [Wheat].Root.NSupply.Retranslocation
        [Wheat].Root.NSupply.Reallocation
        [Wheat].Spike.NSupply.Fixation
        [Wheat].Spike.NSupply.Retranslocation
        [Wheat].Spike.NSupply.Reallocation
        [Wheat].Stem.NSupply.Fixation
        [Wheat].Stem.NSupply.Retranslocation
        [Wheat].Stem.NSupply.Reallocation
        [Wheat].Grain.NSupply.Fixation + [Wheat].Grain.NSupply.Retranslocation + [Wheat].Grain.NSupply.Reallocation + [Wheat].Grain.NSupply.Uptake as Wheat.Grain.NSupply.Total
        [Wheat].Leaf.NSupply.Fixation + [Wheat].Leaf.NSupply.Retranslocation + [Wheat].Leaf.NSupply.Reallocation + [Wheat].Leaf.NSupply.Uptake as Wheat.Leaf.NSupply.Total
        [Wheat].Root.NSupply.Fixation + [Wheat].Root.NSupply.Retranslocation + [Wheat].Root.NSupply.Reallocation - [Wheat].Root.NUptake * 0.1 as Wheat.Root.NSupply.Total
        [Wheat].Spike.NSupply.Fixation + [Wheat].Spike.NSupply.Retranslocation + [Wheat].Spike.NSupply.Reallocation + [Wheat].Spike.NSupply.Uptake as Wheat.Spike.NSupply.Total
        [Wheat].Stem.NSupply.Fixation + [Wheat].Stem.NSupply.Retranslocation + [Wheat].Stem.NSupply.Reallocation  + [Wheat].Stem.NSupply.Uptake as Wheat.Stem.NSupply.Total
        [Wheat].Grain.NSupply.Fixation + [Wheat].Leaf.NSupply.Fixation + [Wheat].Root.NSupply.Fixation + [Wheat].Spike.NSupply.Fixation + [Wheat].Stem.NSupply.Fixation as Wheat.NSupply.Fixation
        [Wheat].Grain.NSupply.Reallocation + [Wheat].Leaf.NSupply.Reallocation + [Wheat].Root.NSupply.Reallocation + [Wheat].Spike.NSupply.Reallocation + [Wheat].Stem.NSupply.Reallocation as Wheat.NSupply.Reallocation
        [Wheat].Grain.NSupply.Retranslocation + [Wheat].Leaf.NSupply.Retranslocation + [Wheat].Root.NSupply.Retranslocation + [Wheat].Spike.NSupply.Retranslocation + [Wheat].Stem.NSupply.Retranslocation as Wheat.NSupply.Retranslocation
        [Wheat].Arbitrator.N.TotalPlantSupply
        [Wheat].Arbitrator.N.TotalPlantDemand
        [Wheat].Arbitrator.FN
        [Wheat].Arbitrator.DMSupply
        [Wheat].TotalLive.Wt as Wheat.TotalLiveWt
        [Wheat].TotalDead.Wt as Wheat.TotalDeadWt
        [Wheat].Grain.GrowthRespiration
        [Wheat].Root.GrowthRespiration
        [Wheat].Leaf.GrowthRespiration
        [Wheat].Stem.GrowthRespiration
        [Wheat].Spike.GrowthRespiration
        [Wheat].Grain.GrowthRespiration + [Wheat].Root.GrowthRespiration + [Wheat].Leaf.GrowthRespiration + [Wheat].Stem.GrowthRespiration + [Wheat].Spike.GrowthRespiration as Wheat.GrowthRespiration
        [Wheat].Stem.PercentWSC
        [Wheat].Grain.MaintenanceRespiration
        [Wheat].Root.MaintenanceRespiration
        [Wheat].Leaf.MaintenanceRespiration
        [Wheat].Spike.MaintenanceRespiration
        [Wheat].Stem.MaintenanceRespiration
        [Wheat].Grain.MaintenanceRespiration + [Wheat].Root.MaintenanceRespiration + [Wheat].Leaf.MaintenanceRespiration + [Wheat].Spike.MaintenanceRespiration + [Wheat].Stem.MaintenanceRespiration as Wheat.MaintenanceRespiration
        [Wheat].Root.MaintenanceRespirationFunction.Value() as Wheat.Root.MaintenanceRespirationFunction
        [Wheat].Grain.MaintenanceRespirationFunction.Value() as Wheat.Grain.MaintenanceRespirationFunction
        [Wheat].Leaf.MaintenanceRespirationFunction.Value() as Wheat.Leaf.MaintenanceRespirationFunction
        [Wheat].Spike.MaintenanceRespirationFunction.Value() as Wheat.Spike.MaintenanceRespirationFunction
        [Wheat].Stem.MaintenanceRespirationFunction.Value() as Wheat.Stem.MaintenanceRespirationFunction
        [Wheat].Root.RootFrontVelocity.Value() as Wheat.Root.RootFrontVelocity
        [Wheat].Root.RootFrontVelocity.WaterFactor.Value() as Wheat.Root.RootFrontVelocity.WaterFactor
        [Wheat].Structure.ApexNum
        [Wheat].Structure.BranchingRate.StressFactors.NitrogenEffect.Value() as Wheat.Structure.BranchingRate.StressFactors.NitrogenEffect
        [Wheat].Structure.BranchingRate.StressFactors.WaterStressEffect.Value() as Wheat.Structure.BranchingRate.StressFactors.WaterStressEffect
        [Wheat].Structure.BranchingRate.StressFactors.CoverEffect.Value() as Wheat.Structure.BranchingRate.StressFactors.CoverEffect
        [Wheat].Leaf.CohortParameters.GrowthDuration.Value() as Wheat.Leaf.CohortParameters.GrowthDuration
        [Wheat].Leaf.CohortParameters.LagDuration.Value() as Wheat.Leaf.CohortParameters.LagDuration
        [Wheat].Leaf.CohortParameters.SenescenceDuration.Value() as Wheat.Leaf.CohortParameters.SenescenceDuration
        [Wheat].Leaf.CohortParameters.DetachmentLagDuration.Value() as Wheat.Leaf.CohortParameters.DetachmentLagDuration
        [Wheat].Leaf.CohortParameters.DetachmentDuration.Value() as Wheat.Leaf.CohortParameters.DetachmentDuration
        [Wheat].Leaf.CohortParameters.MaxArea.Value() as Wheat.Leaf.CohortParameters.MaxArea
        [Wheat].Leaf.CohortParameters.CellDivisionStress.Value() as Wheat.Leaf.CohortParameters.CellDivisionStress
        [Wheat].Leaf.CohortParameters.ExpansionStress.Value() as Wheat.Leaf.CohortParameters.ExpansionStress
        [Wheat].Leaf.CohortParameters.SpecificLeafAreaMax.Value() as Wheat.Leaf.CohortParameters.SpecificLeafAreaMax
        [Wheat].Leaf.CohortParameters.SpecificLeafAreaMin.Value() as Wheat.Leaf.CohortParameters.SpecificLeafAreaMin
        [Wheat].Spike.DMDemand.Structural + [Wheat].Spike.DMDemand.Storage + [Wheat].Spike.DMDemand.Metabolic as Wheat.DMDemand.Spike
        [Wheat].Root.DMDemand.Structural + [Wheat].Root.DMDemand.Storage + [Wheat].Root.DMDemand.Metabolic as Wheat.DMDemand.Root
        [Wheat].Leaf.DMDemand.Structural + [Wheat].Leaf.DMDemand.Storage + [Wheat].Leaf.DMDemand.Metabolic as Wheat.DMDemand.Leaf
        [Wheat].Grain.DMDemand.Structural + [Wheat].Grain.DMDemand.Storage + [Wheat].Grain.DMDemand.Metabolic as Wheat.DMDemand.Grain
        [Wheat].Stem.DMDemand.Structural + [Wheat].Stem.DMDemand.Storage + [Wheat].Stem.DMDemand.Metabolic as Wheat.DMDemand.Stem
        [Wheat].Spike.DMDemand.Structural + [Wheat].Spike.DMDemand.Metabolic as Wheat.DMDemand.SM.Spike
        [Wheat].Root.DMDemand.Structural + [Wheat].Root.DMDemand.Metabolic as Wheat.DMDemand.SM.Root
        [Wheat].Leaf.DMDemand.Structural + [Wheat].Leaf.DMDemand.Metabolic as Wheat.DMDemand.SM.Leaf
        [Wheat].Grain.DMDemand.Structural + [Wheat].Grain.DMDemand.Metabolic as Wheat.DMDemand.SM.Grain
        [Wheat].Stem.DMDemand.Structural + [Wheat].Stem.DMDemand.Metabolic as Wheat.DMDemand.SM.Stem
        [Wheat].Structure.CohortToInitialise
        [Wheat].Structure.PotLeafTipsAppeared
        [Wheat].Structure.LeafTipsAppeared
        [Wheat].Structure.HaunStage
        [Wheat].Structure.NextLeafProportion
        [Wheat].Spike.DMRetranslocationFactor.Value() as Wheat.Spike.DMRetranslocationFactor
        [Wheat].Stem.DMRetranslocationFactor.Value() as Wheat.Stem.DMRetranslocationFactor
        [Wheat].Root.DMConversionEfficiencyFunction.Value() as Wheat.Root.DMConversionEfficiency
        [Wheat].Grain.DMConversionEfficiencyFunction.Value() as Wheat.Grain.DMConversionEfficiency
        [Wheat].Leaf.DMConversionEfficiencyFunction.Value() as Wheat.Leaf.DMConversionEfficiency
        [Wheat].Spike.DMConversionEfficiencyFunction.Value() as Wheat.Spike.DMConversionEfficiency
        [Wheat].Stem.DMConversionEfficiencyFunction.Value() as Wheat.Stem.DMConversionEfficiency
        [Wheat].Stem.DMDemandFunction.PartitionFraction.Value() as Wheat.Stem.DMDemandFraction
        [Wheat].Root.DMDemandFunction.PartitionFraction.Value() as Wheat.Root.DMDemandFraction
        [Wheat].Spike.DMDemandFunction.GrowthDuration.Value() as Wheat.Spike.DMDemandFraction.GrowthDuration
        [Wheat].Spike.StructuralFraction.Value() as Wheat.Spike.StructuralFraction
        [Wheat].Phenology.DaysAfterSowing
        [Wheat].Phenology.ThermalTime.Value() as Wheat.Phenology.ThermalTime
        [Wheat].Phenology.AccumulatedTT as Wheat.Phenology.AccumulateThermalTime
        [Wheat].Phenology.CurrentPhaseName
        [Wheat].Phenology.CurrentStageName
        [Wheat].Phenology.Stage
        [Wheat].Structure.ApexNum
        [Wheat].Structure.LeafTipsAppeared
        [Wheat].Structure.PlantTotalNodeNo
        [Wheat].Structure.InitialiseStage
        [Wheat].Structure.FinalLeafNumber
        [Wheat].Structure.BranchNumber
        [Wheat].Structure.RemainingNodeNo
        [Wheat].Structure.DeltaTipNumber
        [Wheat].Structure.ProportionBranchMortality
        [Wheat].Structure.ProportionPlantMortality
        [Wheat].Structure.BranchingRate.Value() as Wheat.Structure.BranchingRate
        [Wheat].Structure.BranchMortality.Value() as Wheat.Structure.BranchMortality
        [Wheat].Structure.PrimaryBudNo
        [Wheat].Structure.PrimaryBudTotalNodeNo
        [Wheat].Structure.MainStemPopn
        [Wheat].Structure.TotalStemPopn
        [Wheat].Structure.PlantTotalNodeNo
        [Wheat].Structure.MeanTillerGrowthRate.Value() as Wheat.Structure.MeanTillerGrowthRate
        [Wheat].Structure.RelativeNodeApperance
        [Wheat].Structure.Height
        [Wheat].Structure.Phyllochron.Value() as Wheat.Structure.Phyllochron
        [Wheat].Leaf.InitialisedCohortNo
        [Wheat].Leaf.AppearedCohortNo
        [Wheat].Leaf.ExpandingCohortNo
        [Wheat].Leaf.ExpandedCohortNo
        [Wheat].Leaf.GreenCohortNo
        [Wheat].Leaf.SenescingCohortNo
        [Wheat].Leaf.DeadCohortNo
        [Wheat].Leaf.PlantAppearedGreenLeafNo
        [Wheat].Leaf.PlantAppearedLeafNo
        [Wheat].Leaf.PlantsenescedLeafNo
        [Wheat].Leaf.CohortAge[1:11]
        [Wheat].Leaf.CohortArea[1:11]
        [Wheat].Leaf.CohortSize[1:11]
        [Wheat].Leaf.CohortMaxArea[1:11]
        [Wheat].Leaf.CohortSLA[1:11]
        [Wheat].Leaf.CohortLagDuration[1:11]
        [Wheat].Leaf.CohortGrowthDuration[1:11]
        [Wheat].Leaf.CohortDeltaWaterConstrainedArea[1:11]
        [Wheat].Leaf.CohortDeltaCarbonConstrainedArea[1:11]
        [Wheat].Leaf.LivePopulation[1:11]
        [Wheat].Leaf.CohortSenescedFrac[1:11]
        [Wheat].Leaf.FinalLeafFraction
        [Wheat].Leaf.LiveStemNumber
        [Wheat].Leaf.LAI
        [Wheat].Leaf.LAIDead
        [Wheat].Leaf.LAITotal
        [Wheat].Leaf.CoverDead
        [Wheat].Leaf.CoverGreen
        [Wheat].Leaf.CoverTotal
        [Wheat].Leaf.Live.Wt as Wheat.Leaf.LiveWeight
        [Wheat].Leaf.Dead.Wt as Wheat.Leaf.DeadWeight
        [Wheat].Leaf.SpecificArea
        [Wheat].Leaf.Fn
        [Wheat].WaterSupplyDemandRatio
        [Wheat].Leaf.CohortParameters.LeafRankAfterTerminalSpikelet.Value() as Wheat.Leaf.CohortParameters.LeafRankAfterTerminalSpikelet
        [Wheat].Leaf.CohortParameters.LeafNumberAtTerminalSpikelet.Value() as Wheat.Leaf.CohortParameters.LeafNumberAtTerminalSpikelet
        [Wheat].Leaf.CohortParameters.LagDuration.Value() as Wheat.Leaf.CohortParameters.LagDuration
        [Wheat].Grain.Number
        [Wheat].Grain.Size
        [Wheat].Grain.FSize
        [Wheat].Grain.DMDemand.Structural
        [Wheat].Grain.DMDemand.Storage
        [Wheat].Grain.DMDemand.Metabolic
        [Wheat].Grain.Live.StructuralWt
        [Wheat].Grain.Live.StorageWt
        [Wheat].Grain.Live.MetabolicWt
        [Wheat].Grain.Dead.StructuralWt
        [Wheat].Grain.Dead.StorageWt
        [Wheat].Grain.Dead.MetabolicWt
        [Wheat].Grain.Allocated.StructuralWt
        [Wheat].Grain.Allocated.StorageWt
        [Wheat].Grain.Allocated.MetabolicWt
        [Wheat].Grain.DMSupply.Retranslocation
        [Wheat].Grain.DMSupply.Fixation
        [Wheat].Grain.DMSupply.Reallocation
        [Wheat].Grain.Wt as Wheat.GrainWt
        [Wheat].Leaf.DMDemand.Structural
        [Wheat].Leaf.DMDemand.Storage
        [Wheat].Leaf.DMDemand.Metabolic
        [Wheat].Leaf.Live.StructuralWt
        [Wheat].Leaf.Live.StorageWt
        [Wheat].Leaf.Live.MetabolicWt
        [Wheat].Leaf.Dead.StructuralWt
        [Wheat].Leaf.Dead.StorageWt
        [Wheat].Leaf.Dead.MetabolicWt
        [Wheat].Leaf.Allocated.StructuralWt
        [Wheat].Leaf.Allocated.StorageWt
        [Wheat].Leaf.Allocated.MetabolicWt
        [Wheat].Leaf.DMSupply.Retranslocation
        [Wheat].Leaf.DMSupply.Fixation
        [Wheat].Leaf.DMSupply.Reallocation
        [Wheat].Leaf.Wt as Wheat.LeafWt
        [Wheat].Stem.DMDemand.Structural
        [Wheat].Stem.DMDemand.Storage
        [Wheat].Stem.DMDemand.Metabolic
        [Wheat].Stem.Live.StructuralWt
        [Wheat].Stem.Live.StorageWt
        [Wheat].Stem.Live.MetabolicWt
        [Wheat].Stem.Dead.StructuralWt
        [Wheat].Stem.Dead.StorageWt
        [Wheat].Stem.Dead.MetabolicWt
        [Wheat].Stem.Allocated.StructuralWt
        [Wheat].Stem.Allocated.StorageWt
        [Wheat].Stem.Allocated.MetabolicWt
        [Wheat].Stem.DMSupply.Retranslocation
        [Wheat].Stem.DMSupply.Fixation
        [Wheat].Stem.DMSupply.Reallocation
        [Wheat].Stem.Wt as Wheat.StemWt
        [Wheat].Stem.DMSupply.Fixation + [Wheat].Stem.DMSupply.Retranslocation + [Wheat].Stem.DMSupply.Reallocation as Wheat.DMSupply.Stem
        [Wheat].Grain.DMSupply.Fixation + [Wheat].Grain.DMSupply.Retranslocation + [Wheat].Grain.DMSupply.Reallocation as Wheat.DMSupply.Grain
        [Wheat].Leaf.DMSupply.Fixation + [Wheat].Leaf.DMSupply.Retranslocation + [Wheat].Leaf.DMSupply.Reallocation as Wheat.DMSupply.Leaf
        [Wheat].Root.DMSupply.Fixation + [Wheat].Root.DMSupply.Retranslocation + [Wheat].Root.DMSupply.Reallocation as Wheat.DMSupply.Root
        [Wheat].Spike.DMSupply.Fixation + [Wheat].Spike.DMSupply.Retranslocation + [Wheat].Spike.DMSupply.Reallocation as Wheat.DMSupply.Spike
        [Wheat].Spike.DMDemand.Structural
        [Wheat].Spike.DMDemand.Storage
        [Wheat].Spike.DMDemand.Metabolic
        [Wheat].Spike.Live.StructuralWt
        [Wheat].Spike.Live.StorageWt
        [Wheat].Spike.Live.MetabolicWt
        [Wheat].Spike.Dead.StructuralWt
        [Wheat].Spike.Dead.StorageWt
        [Wheat].Spike.Dead.MetabolicWt
        [Wheat].Spike.Allocated.StructuralWt
        [Wheat].Spike.Allocated.StorageWt
        [Wheat].Spike.Allocated.MetabolicWt
        [Wheat].Spike.DMSupply.Retranslocation
        [Wheat].Spike.DMSupply.Fixation
        [Wheat].Spike.DMSupply.Reallocation
        [Wheat].Spike.Wt as Wheat.SpikeWt
        [Wheat].Root.DMDemand.Structural
        [Wheat].Root.DMDemand.Storage
        [Wheat].Root.DMDemand.Metabolic
        [Wheat].Root.Live.StructuralWt
        [Wheat].Root.Live.StorageWt
        [Wheat].Root.Live.MetabolicWt
        [Wheat].Root.Dead.StructuralWt
        [Wheat].Root.Dead.StorageWt
        [Wheat].Root.Dead.MetabolicWt
        [Wheat].Root.Allocated.StructuralWt
        [Wheat].Root.Allocated.StorageWt
        [Wheat].Root.Allocated.MetabolicWt
        [Wheat].Root.DMSupply.Retranslocation
        [Wheat].Root.DMSupply.Fixation
        [Wheat].Root.DMSupply.Reallocation
        [Wheat].Root.Wt as Wheat.RootWt
        [Wheat].Root.Length
        [Wheat].Root.Depth
        [Wheat].Root.Detached.StructuralWt
        [Wheat].Root.Detached.StorageWt
        [Wheat].Root.Detached.MetabolicWt
        [Wheat].Leaf.Live.StructuralWt + [Wheat].Leaf.Live.StorageWt + [Wheat].Leaf.Live.MetabolicWt as Wheat.Leaf.LiveWt
        [Wheat].Root.Live.StructuralWt + [Wheat].Root.Live.StorageWt + [Wheat].Root.Live.MetabolicWt as Wheat.Root.LiveWt
        [Wheat].Grain.Live.StructuralWt + [Wheat].Grain.Live.StorageWt + [Wheat].Grain.Live.MetabolicWt as Wheat.Grain.LiveWt
        [Wheat].Spike.Live.StructuralWt + [Wheat].Spike.Live.StorageWt + [Wheat].Spike.Live.MetabolicWt as Wheat.Spike.LiveWt
        [Wheat].Stem.Live.StructuralWt + [Wheat].Stem.Live.StorageWt + [Wheat].Stem.Live.MetabolicWt as Wheat.Stem.LiveWt
        [Wheat].Leaf.Dead.StructuralWt + [Wheat].Leaf.Dead.StorageWt + [Wheat].Leaf.Dead.MetabolicWt as Wheat.Leaf.DeadWt
        [Wheat].Root.Dead.StructuralWt + [Wheat].Root.Dead.StorageWt + [Wheat].Root.Dead.MetabolicWt as Wheat.Root.DeadWt
        [Wheat].Grain.Dead.StructuralWt + [Wheat].Grain.Dead.StorageWt + [Wheat].Grain.Dead.MetabolicWt as Wheat.Grain.DeadWt
        [Wheat].Spike.Dead.StructuralWt + [Wheat].Spike.Dead.StorageWt + [Wheat].Spike.Dead.MetabolicWt as Wheat.Spike.DeadWt
        [Wheat].Stem.Dead.StructuralWt + [Wheat].Stem.Dead.StorageWt + [Wheat].Stem.Dead.MetabolicWt as Wheat.Stem.DeadWt
        [Wheat].Grain.DMSupply.Fixation + [Wheat].Root.DMSupply.Fixation + [Wheat].Leaf.DMSupply.Fixation + [Wheat].Spike.DMSupply.Fixation + [Wheat].Stem.DMSupply.Fixation +  [Wheat].Grain.DMSupply.Retranslocation + [Wheat].Root.DMSupply.Retranslocation + [Wheat].Leaf.DMSupply.Retranslocation + [Wheat].Spike.DMSupply.Retranslocation + [Wheat].Stem.DMSupply.Retranslocation + [Wheat].Grain.DMSupply.Reallocation + [Wheat].Root.DMSupply.Reallocation + [Wheat].Leaf.DMSupply.Reallocation + [Wheat].Spike.DMSupply.Reallocation + [Wheat].Stem.DMSupply.Reallocation as Wheat.DMSupply
        [Wheat].Grain.DMSupply.Fixation + [Wheat].Root.DMSupply.Fixation + [Wheat].Leaf.DMSupply.Fixation + [Wheat].Spike.DMSupply.Fixation + [Wheat].Stem.DMSupply.Fixation as Wheat.DMSupply.Fixation
        [Wheat].Grain.DMSupply.Reallocation + [Wheat].Root.DMSupply.Reallocation + [Wheat].Leaf.DMSupply.Reallocation + [Wheat].Spike.DMSupply.Reallocation + [Wheat].Stem.DMSupply.Reallocation as Wheat.DMSupply.Reallocation
        [Wheat].Grain.DMSupply.Retranslocation + [Wheat].Root.DMSupply.Retranslocation + [Wheat].Leaf.DMSupply.Retranslocation + [Wheat].Spike.DMSupply.Retranslocation + [Wheat].Stem.DMSupply.Retranslocation as Wheat.DMSupply.Retranslocation
        [Wheat].Root.DMDemand.Structural + [Wheat].Root.DMDemand.Storage + [Wheat].Root.DMDemand.Metabolic + [Wheat].Grain.DMDemand.Structural + [Wheat].Grain.DMDemand.Storage + [Wheat].Grain.DMDemand.Metabolic + [Wheat].Spike.DMDemand.Structural + [Wheat].Spike.DMDemand.Storage + [Wheat].Spike.DMDemand.Metabolic + [Wheat].Stem.DMDemand.Structural + [Wheat].Stem.DMDemand.Storage + [Wheat].Stem.DMDemand.Metabolic + [Wheat].Leaf.DMDemand.Structural + [Wheat].Leaf.DMDemand.Storage + [Wheat].Leaf.DMDemand.Metabolic as Wheat.DMDemand
        [Wheat].Root.DMDemand.Structural + [Wheat].Grain.DMDemand.Structural + [Wheat].Spike.DMDemand.Structural + [Wheat].Stem.DMDemand.Structural + [Wheat].Leaf.DMDemand.Structural as Wheat.DMDemand.Structural
        [Wheat].Root.DMDemand.Metabolic + [Wheat].Grain.DMDemand.Metabolic + [Wheat].Spike.DMDemand.Metabolic + [Wheat].Stem.DMDemand.Metabolic + [Wheat].Leaf.DMDemand.Metabolic as Wheat.DMDemand.Metabolic
        [Wheat].Root.DMDemand.Storage + [Wheat].Grain.DMDemand.Storage + [Wheat].Spike.DMDemand.Storage + [Wheat].Stem.DMDemand.Storage + [Wheat].Leaf.DMDemand.Storage as Wheat.DMDemand.Storage
        [Wheat].Root.DMDemand.Structural + [Wheat].Grain.DMDemand.Structural + [Wheat].Spike.DMDemand.Structural + [Wheat].Stem.DMDemand.Structural + [Wheat].Leaf.DMDemand.Structural + [Wheat].Root.DMDemand.Metabolic + [Wheat].Grain.DMDemand.Metabolic + [Wheat].Spike.DMDemand.Metabolic + [Wheat].Stem.DMDemand.Metabolic + [Wheat].Leaf.DMDemand.Metabolic as Wheat.DMDemand.StructuralMetabolic
        [Wheat].Spike.Allocated.StructuralWt + [Wheat].Spike.Allocated.StorageWt + [Wheat].Spike.Allocated.MetabolicWt as Wheat.Spike.AllocatedDM
        [Wheat].Stem.Allocated.StructuralWt + [Wheat].Stem.Allocated.StorageWt + [Wheat].Stem.Allocated.MetabolicWt as Wheat.Stem.AllocatedDM
        [Wheat].Leaf.Allocated.StructuralWt + [Wheat].Leaf.Allocated.StorageWt + [Wheat].Leaf.Allocated.MetabolicWt as Wheat.Leaf.AllocatedDM
        [Wheat].Root.Allocated.StructuralWt + [Wheat].Root.Allocated.StorageWt + [Wheat].Root.Allocated.MetabolicWt as Wheat.Root.AllocatedDM
        [Wheat].Grain.Allocated.StructuralWt + [Wheat].Grain.Allocated.StorageWt + [Wheat].Grain.Allocated.MetabolicWt as Wheat.Grain.AllocatedDM
        [Wheat].Spike.Allocated.StructuralWt + [Wheat].Spike.Allocated.StorageWt + [Wheat].Spike.Allocated.MetabolicWt + [Wheat].Stem.Allocated.StructuralWt + [Wheat].Stem.Allocated.StorageWt + [Wheat].Stem.Allocated.MetabolicWt + [Wheat].Leaf.Allocated.StructuralWt + [Wheat].Leaf.Allocated.StorageWt + [Wheat].Leaf.Allocated.MetabolicWt + [Wheat].Root.Allocated.StructuralWt + [Wheat].Root.Allocated.StorageWt + [Wheat].Root.Allocated.MetabolicWt + [Wheat].Grain.Allocated.StructuralWt + [Wheat].Grain.Allocated.StorageWt + [Wheat].Grain.Allocated.MetabolicWt as Wheat.AllocatedDM
    Plant Wheat: CropType=Wheat
      Memo TitlePage
        # The APSIM Wheat Model

        _Brown, H.E., Huth, N.I. and Holzworth, D.P._

        The APSIM wheat model has been developed using the Plant Modelling Framework (PMF) of [brown_plant_2014]. This new framework provides a library of plant organ and process submodels that can be coupled, at runtime, to construct a model in much the same way that models can be coupled to construct a simulation. This means that dynamic composition of lower level process and organ classes (e.g. photosynthesis, leaf) into larger constructions (e.g. maize, wheat, sorghum) can be achieved by the model developer without additional coding.

        The model consists of:

        * a phenology model to simulate development between developmental phases
        * a structure model to simulate plant morphology
        * a collection of organs to simulate the various plant parts
        * an arbitrator to allocate resources (N, biomass) to the various plant organs
      OrganArbitrator Arbitrator
        RelativeAllocation NArbitrator
        RelativeAllocation DMArbitrator
      Phenology: DaysAfterSowing=0
        Memo
          Wheat exhibits a range of developmental responses to environment and these are strongly influences by genotype characteristics.
          Temperature effects development increasing development rates and decreasing phase durations as temperatures increase.  Theset affects are captured by thermal time, .  However, wheat also exhibits vernalisation and photoperiod sensitivities in its Vegetative phase and further photoperiod sensitivity in the EarlyReproducivePhase.  Photoperiod responses are seen as a reduction in the length of a phase for a photoperiod sensitive genotype in response to a longer photoperiod.  Vernalisation responses are more complicated as they are driven by temperature but interact with photoperiod.  For vernalisation sensitive varieties (Winter types) exposure to cool temperatures or short photoperiods during the Vegetative phase will reduce the thermal time duration of the vegetative phase.

          We draw on the Kirby Framework to capture these vernalisation and photoperiod responses.  This framework assumes that the timing of anthesis is a result of the timing of flag leaf and an additional thermal time passage from there to anthesis.  It also assumes the timing of flag leaf is a result of the Final Leaf Number which sets a target, and leaf appearance rate, which sets the rate of progress toward this target.  Leaf appearance rate is a function of Thermal time and a genotype specific Phyllochron which changes with Haun stage as described by [Jamieson_LeafAppearance_1995].

          Final Leaf Number (FLN) is modeled as the sum of three numbers:

          FLN = MinLeafNumber + VernalLeaves + PhotoLeaves

          Where MinLeafNumber is the number of leaves that a wheat crop will produce when vernalisation is satisified early in the crops duration (before 2nd true leaf) and it is grown in a long photoperiod..  VernalLeaves are the number of leaves that are added due to vernalisation effects.  For insensitive varieties this will always be zero but this is potentially a larger number for sensitivie varieties and the number progresively decreases as the crop encounters more vernalisation.  PhotoLeaves are the number of leaves that are added to the minimum leaf number as a result of short day exposure.  For insensitive varieties this will be zero but is potential larger for more sensitivie varieties and decreases as day length increases.  More detailed explinations of the components of phenology are provided below.
        DivideFunction MeanTemp
          AddFunction TempSum
            VariableReference MaxT: VariableName=[IWeather].MaxT
            VariableReference MinT: VariableName=[IWeather].MinT
          Constant Two: FixedValue=2
        MultiplyFunction ThermalTime
          Memo
            Maintenance Respiration Function
          Constant MaintenanceFractionAt20C: FixedValue=27.5
          WangEngelTempFunction: MinTemp=0; OptTemp=27.5; MaxTemp=40; RefTemp=27.5; MaximumTemperatureWeighting=0.5
        AirTemperatureFunction ThermalTime_OLD
          XYPairs: X=[0, 26, 37]; Y=[0, 26, 0]
          Memo
            Thermal time determines the rate of developmental progress through many of the crops phases and is used by organs to determing potential growth rates.
        MultiplyFunction DailyVernalisation
          Memo
            Vernalisation responses are based on those described by [Brown_Anthesis_2013].   Vernalisation is assumed to be related to the expression of the Vrn1 Gene.  Its experssion is accumulated daily and daily upregulation as a function of development (DeltaHaunStage) and a TempResponseProfile that declines exponentially from a maximum at 1<sup>o</sup>C to zero at 0<sup>o</sup>C and at 18<sup>o</sup>C.
          VariableReference DeltaHaunStage: VariableName=[Structure].DeltaHaunStage
          AirTemperatureFunction TempResponseProfile
            XYPairs
              X=[0, 1, 2, 3, 4, 5, 6, 7, 8, 9, 10, 11, 12, 13, 14, 15, 16, 17, 18, 19, 20, 30, 32]
              Y=[0, 1.205, 1.037, 0.893, 0.768, 0.661, 0.569, 0.49, 0.422, 0.363, 0.312, 0.269, 0.231, 0.199, 0.171, 0.148, 0.127, 0.109, 0.094, 0.081, 0, 0, -0.5]
        PhotoperiodFunction Photoperiod: Twilight=-6; DayLength=0
        PhaseLookup PerceivedPhotoPeriod
          PhaseLookupValue ApexBelowGround: Start=Germination; End=Emergence
            Constant Photoperiod: FixedValue=0; Units=h
          PhaseLookupValue ApexAboveGround: Start=Emergence; End=HarvestRipe
            VariableReference Photoperiod: VariableName=[Phenology].Photoperiod.Value()
        MinimumFunction Vrn1
          Memo
            Vrn1 accumulation begins when Vrn4 experssion is down regulated to zero and stops, assuming vernalisation saturation, at a value of 1
          Constant Saturation: FixedValue=1; Units=Relative Experssion
          AccumulateFunction CurrentExpression: StartStageName=Germination; EndStageName=TerminalSpikelet; FractionRemovedOnCut=0; FractionRemovedOnHarvest=0; FractionRemovedOnGraze=0; FractionRemovedOnPrune=0
            LessThanFunction Vernalisation
              VariableReference If_Vrn4: VariableName=[Phenology].Vrn4.Value()
              VariableReference IsLessThanLag: VariableName=[Phenology].VernLag.Value()
              Constant Return_Zero: FixedValue=0
              VariableReference elseReturn_Vernalisation: VariableName=[Phenology].DailyVernalisation.Value()
        MinimumFunction Vrn4
          VariableReference MaxExpression: VariableName=[Phenology].VernLag.Value()
          AccumulateFunction CurrentExpression: StartStageName=Germination; EndStageName=TerminalSpikelet; FractionRemovedOnCut=0; FractionRemovedOnHarvest=0; FractionRemovedOnGraze=0; FractionRemovedOnPrune=0
            VariableReference VernalisationConditioning: VariableName=[Phenology].DailyVernalisation.Value()
        Constant MinimumLeafNumber: FixedValue=7; Units=Leaves
          Memo
            Number of leaves the plant will produce when fully vernalised early and grown in long photoperiod
        Constant VrnSensitivity: FixedValue=0; Units=Leaves
          Memo
            The difference between Inherent earlyness leaf number and the number of leaves produced when the plant is unvernalised and grown in long photoperiod
        Constant VernLag: FixedValue=1; Units=Unitless
          Memo
            The amount of vernalising temperature required before vernalisation response will be evident.  Value of relative to the amount offl vernalisation temperature required from the end of the lag until vernalisation saturation.  A value of 0 means there is no lag, a value of 1 means the lag is the same (in vernal time) as the vernalisation requirement and a value of 2 means the lag is twice as long as the vernalisation response phase
        Constant PpSensitivity: FixedValue=3; Units=Leaves
          Memo
            The reduction in leaf number going from 8 to 16 h Pp
        Constant EarlyReproductivePpSensitivity: FixedValue=0
          Memo
            The phyllochrons duration for the plant to go from flag leaf ligual appearance at 16 h Pp compared to the phyllochron duration for the same phase at 8 h Pp.
        Constant EarlyReproductiveLongDayBase: FixedValue=2.5
          Memo
            The phyllochrons duration for the plant to go from flag leaf ligual appearance at 16 h Pp.
        GerminatingPhase Germinating: Start=Sowing; End=Germination
        EmergingPhase Emerging: Start=Germination; End=Emergence; ShootLag=40; ShootRate=1.5
          VariableReference ThermalTime: VariableName=[Phenology].ThermalTime.Value()
        GenericPhase Vegetative: Start=Emergence; End=TerminalSpikelet
          Memo
            The duration of the vegetative phase is set by a target Haun Stage for the occurence of Terminal Spikelet and the rate of leaf appearance.
          VariableReference ThermalTime: VariableName=[Phenology].ThermalTime.Value()
          MultiplyFunction Target
            VariableReference Phyllochron: VariableName=[Structure].MeanPhyllochron.Value()
            VariableReference HSTS: VariableName=[Structure].HaunStageTerminalSpikelet.Value()
          Memo Memo1
            HaunStageTerminalSpiklet decreases as vernalisation is accumulated and as photoperiod extends, capturing the effect of these responses on the duration of the Vegetative phase
        LeafAppearancePhase StemElongation: Start=TerminalSpikelet; End=FlagLeaf
          Memo
            The Final leaf number is fixed at Terminal Spikelet and leaves contune to appear at a rate set by thermal time and phyllochron until flag leaf liguale appears and this phase is completed.
          VariableReference ThermalTime: VariableName=[Phenology].ThermalTime.Value()
        GenericPhase EarlyReproductive: Start=FlagLeaf; End=Flowering
          VariableReference ThermalTime: VariableName=[Phenology].ThermalTime.Value()
          MultiplyFunction Target
            VariableReference Phyllochron: VariableName=[Structure].Phyllochron.BasePhyllochron.Value()
            AddFunction Phyllochrons
              VariableReference LongDayBase: VariableName=[Phenology].EarlyReproductiveLongDayBase.Value()
              MultiplyFunction IncreaseDueToShortPhotoPeriod
                LinearInterpolationFunction PhotoPeriodResponse: XProperty=[Phenology].Photoperiod.Value()
                  XYPairs: X=[11, 16]; Y=[1, 0]
                VariableReference PpSensitivity: VariableName=[Phenology].EarlyReproductivePpSensitivity.Value()
        GenericPhase GrainDevelopment: Start=Flowering; End=StartGrainFill
          Constant Target: FixedValue=120
          VariableReference ThermalTime: VariableName=[Phenology].ThermalTime.Value()
        GenericPhase GrainFilling: Start=StartGrainFill; End=EndGrainFill
          Constant Target: FixedValue=545
          VariableReference ThermalTime: VariableName=[Phenology].ThermalTime.Value()
        GenericPhase Maturing: Start=EndGrainFill; End=Maturity
          Constant Target: FixedValue=35
          VariableReference ThermalTime: VariableName=[Phenology].ThermalTime.Value()
        GenericPhase Ripening: Start=Maturity; End=HarvestRipe
          Constant Target: FixedValue=300
          VariableReference ThermalTime: VariableName=[Phenology].ThermalTime.Value()
        EndPhase ReadyForHarvesting: Start=HarvestRipe; End=Unused
          VariableReference ThermalTime: VariableName=[Phenology].ThermalTime.Value()
        ZadokPMF Zadok
        OnEventFunction FlagLeafDAS: SetEvent=FlagLeaf; ReSetEvent=never
          Memo
            A function is used to provide flowering date as days after sowing(DAS).
          Constant PreEventValue: FixedValue=0
          VariableReference PostEventValue: VariableName=[Phenology].DaysAfterSowing
        OnEventFunction FloweringDAS: SetEvent=Flowering; ReSetEvent=never
          Memo
            A function is used to provide flowering date as days after sowing(DAS).
          Constant PreEventValue: FixedValue=0
          VariableReference PostEventValue: VariableName=[Phenology].DaysAfterSowing
        OnEventFunction MaturityDAS: SetEvent=Maturity; ReSetEvent=never
          Memo
            A function is used to provide maturity date as days after sowing(DAS).
          Constant PreEventValue: FixedValue=0
          VariableReference PostEventValue: VariableName=[Phenology].DaysAfterSowing
      Structure: Initialised=false; Germinated=false; Emerged=false; CohortToInitialise=0; TipToAppear=0; ApexNum=0
        VariableReference ThermalTime: VariableName=[Phenology].ThermalTime.Value()
        MultiplyFunction Phyllochron
          Memo Rational
            This is the thermal time between the emergence of leaf tips.  The model used here is based on [Jamieson_SIRIUS_1998] where leaf appearace could be described by a base phyllochron determined between leaves 2 and 7 and a phyllochron that was 70% of base phyllochron for leaves < 2 and 130% of base phyllochron for leaves > 7
          LinearInterpolationFunction LeafStageFactor: XProperty=[Leaf].AppearedCohortNo
            XYPairs: X=[0, 2, 3, 7, 8, 11, 12]; Y=[0.75, 0.75, 1, 1, 1.4, 1.4, 1.4]
          Constant BasePhyllochron: FixedValue=120; Units=oC.d
          LinearInterpolationFunction PhotoPeriodEffect: XProperty=[Phenology].Photoperiod.Value()
            XYPairs: X=[8, 12, 14]; Y=[1.6, 1, 1]
        MultiplyFunction BranchingRate
          Memo
            Potential branching rate is determined by the commonly observed pattern of tillering in wheat, in which each tiller emerges with the third leaf on its parent axis (e.g. first tiller emerges at the same time as the third leaf on the main stem, the first secondary tiller appears with the third leaf on tiller 1).  This is described as a simple function of main stem leaf number.
          PhaseLookup PotentialBranchingRate
            PhaseLookupValue Vegetative: Start=Emergence; End=TerminalSpikelet
              LinearInterpolationFunction PotentialBranchingRate: XProperty=[Structure].LeafTipsAppeared
                XYPairs: X=[1, 2, 3, 4, 5, 6, 7, 8, 9]; Y=[0, 1, 1, 2, 3, 5, 8, 13, 20]
            PhaseLookupValue Reproductive: Start=TerminalSpikelet; End=HarvestRipe
              Constant Zero: FixedValue=0
          MinimumFunction StressFactors
            LinearInterpolationFunction NitrogenEffect: XProperty=[Arbitrator].FN
              Memo
                Inadequate Nitrogen supply is assumed to affect tillering prior to any effect on photosynthesis or leaf size.
              XYPairs: X=[0.5, 2, 3]; Y=[1, 1, 1]
            LinearInterpolationFunction CoverEffect: XProperty=[Leaf].CoverTotal
              Memo
                Tillering is said to cease once a threshold fraction of incoming radiation has been achieved.  This captures shading effects on tillering described by [evers2006cessation].
              XYPairs: X=[0, 0.1, 0.25]; Y=[1, 1, 0]
            LinearInterpolationFunction WaterStressEffect: XProperty=[Root].WaterTensionFactor
              XYPairs: X=[0, 1]; Y=[0, 1]
        PhaseLookup BranchMortality
          PhaseLookupValue MortalityPhase: Start=FlagLeaf; End=Flowering
            MultiplyFunction Mortality
              LinearInterpolationFunction MortalityPerDegDay: XProperty=[Structure].MeanTillerGrowthRate.Value()
                XYPairs: X=[0, 0.005]; Y=[0.002, 0]
              VariableReference ThermalTime: VariableName=[Phenology].ThermalTime.Value()
        HeightFunction HeightModel
          LinearInterpolationFunction PotentialHeight: XProperty=[Phenology].Stage
            XYPairs: X=[3, 4, 5, 6, 7]; Y=[10, 200, 1000, 1100, 1200]
          LinearInterpolationFunction WaterStress: XProperty=[Leaf].Fw
            XYPairs: X=[0.3, 1]; Y=[0, 1]
        MovingAverageFunction MeanTillerGrowthRate: NumberOfDays=5; InitialValue=0
          Memo
            This is calculated to represent the supply of asslimilate to individual tillers over the past 5 days to use as an index to determine tiller mortality.  When tiller numbers are high or total crop assimilate supply is small there will not be enough assimilate to maintain all of the tillers so the model will senesce some.
          DivideFunction TillerGrowthRate
            VariableReference DailyGrowth: VariableName=[Arbitrator].DM.TotalFixationSupply
            VariableReference ThermalTime: VariableName=[Phenology].ThermalTime.Value()
            VariableReference StemPopulation: VariableName=[Structure].TotalStemPopn
        MovingAverageFunction MeanPhyllochron: NumberOfDays=300; InitialValue=80
          VariableReference Phyllochron: VariableName=[Structure].Phyllochron.Value()
        HoldFunction FinalLeafNumber: WhenToHold=TerminalSpikelet
          AddFunction FinalNodeNumber
            VariableReference MinLeafNumber: VariableName=[Phenology].MinimumLeafNumber.Value()
            MultiplyFunction VernalLeaves
              VariableReference UnVernalisedLeaves: VariableName=[Phenology].VrnSensitivity.Value()
              SubtractFunction VernalisationReductionFactor
                Constant One: FixedValue=1
                VariableReference RelativeVrn1Expression: VariableName=[Phenology].Vrn1.Value()
            MultiplyFunction PhotoPLeaves
              VariableReference ShortPpLeaves: VariableName=[Phenology].PpSensitivity.Value()
              LinearInterpolationFunction PhotoPeriodReductionFactor: XProperty=[Phenology].Photoperiod.Value()
                XYPairs: X=[10, 16]; Y=[1, 0]
        ExpressionFunction HaunStageTerminalSpikelet: Expression=([Structure].FinalLeafNumber.Value() - 2.85)/1.1
          Memo
            The Haun stage at which Terminal Spikelet occurs is determined from final leaf number using the approach described in [Brown_Anthesis_2013].
        AddFunction HaunStage
          VariableReference AppearedLeaves: VariableName=[Leaf].ExpandedCohortNo
          VariableReference ProportionOfExpandingLeaf: VariableName=[Leaf].NextExpandingLeafProportion
        Constant StemSenescenceAge: FixedValue=4
      ReproductiveOrgan Grain: GrowthRespiration=0; MaintenanceRespiration=0; RipeStage=Ripe
        HoldFunction NumberFunction: WhenToHold=Flowering
          MultiplyFunction GrainNumber
            Constant GrainsPerGramOfStem: FixedValue=22; Units=grains
            VariableReference StemMass: VariableName=[StemPlusSpike].Wt
        Constant InitialGrainProportion: FixedValue=0.05
        Constant MaximumPotentialGrainSize: FixedValue=0.043; Units=g
        PhaseLookup DMDemandFunction
          PhaseLookupValue InitialPhase: Start=Flowering; End=StartGrainFill
            FillingRateFunction
              VariableReference NumberFunction: VariableName=[Grain].NumberFunction.Value()
              VariableReference FillingDuration: VariableName=[Phenology].GrainDevelopment.Target.Value()
              VariableReference ThermalTime: VariableName=[Phenology].ThermalTime.Value()
              MultiplyFunction PotentialSizeIncrement
                VariableReference InitialProportion: VariableName=[Grain].InitialGrainProportion.Value()
                VariableReference MaximumSize: VariableName=[Grain].MaximumPotentialGrainSize.Value()
          PhaseLookupValue LinearPhase: Start=StartGrainFill; End=EndGrainFill
            FillingRateFunction
              VariableReference NumberFunction: VariableName=[Grain].NumberFunction.Value()
              VariableReference FillingDuration: VariableName=[Phenology].GrainFilling.Target.Value()
              VariableReference ThermalTime: VariableName=[Phenology].ThermalTime.Value()
              MultiplyFunction PotentialSizeIncrement
                SubtractFunction ProportionLinearPhase
                  Constant One: FixedValue=1
                  VariableReference InitialProportion: VariableName=[Grain].InitialGrainProportion.Value()
                VariableReference MaximumSize: VariableName=[Grain].MaximumPotentialGrainSize.Value()
        LinearInterpolationFunction MinimumNConc: XProperty=[Phenology].Stage
          XYPairs: X=[0, 6, 7.33, 7.331, 8]; Y=[0, 0, 0, 0.0123, 0.0123]
        LinearInterpolationFunction MaximumNConc: XProperty=[Phenology].Stage
          XYPairs: X=[0, 6, 7.33, 7.331, 8]; Y=[0, 0, 0, 0.03, 0.03]
        Constant MaxNConcDailyGrowth: FixedValue=0.03
        PhaseLookup NFillingRate
          PhaseLookupValue GrainFilling: Start=Flowering; End=EndGrainFill
            FillingRateFunction
              VariableReference NumberFunction: VariableName=[Grain].NumberFunction.Value()
              AddFunction FillingDuration
                VariableReference FloweringToGrainFilling: VariableName=[Phenology].GrainDevelopment.Target.Value()
                VariableReference GrainFilling: VariableName=[Phenology].GrainFilling.Target.Value()
              VariableReference ThermalTime: VariableName=[Phenology].ThermalTime.Value()
              MultiplyFunction PotentialSizeIncrement
                VariableReference MaximumSize: VariableName=[Grain].MaximumPotentialGrainSize.Value()
                VariableReference MaximumNConc: VariableName=[Grain].MaximumNConc.Value()
        Constant WaterContent: FixedValue=0.12
        AccumulateFunction AccumThermalTime: StartStageName=Flowering; EndStageName=Maturity; FractionRemovedOnCut=0; FractionRemovedOnHarvest=0; FractionRemovedOnGraze=0; FractionRemovedOnPrune=0
          VariableReference DailyThermalTimeValue: VariableName=[Phenology].ThermalTime.Value()
        ExpressionFunction Protein
          Expression=([Grain].Live.N + [Grain].Dead.N)/([Grain].Live.Wt + [Grain].Dead.Wt) * 100 * 5.71
        BiomassRemoval BiomassRemovalDefaults
          OrganBiomassRemovalType Harvest: FractionLiveToRemove=1; FractionDeadToRemove=0; FractionLiveToResidue=0; FractionDeadToResidue=0
          OrganBiomassRemovalType Cut: FractionLiveToRemove=1; FractionDeadToRemove=0; FractionLiveToResidue=0; FractionDeadToResidue=0
          OrganBiomassRemovalType Prune: FractionLiveToRemove=0; FractionDeadToRemove=0; FractionLiveToResidue=0.8; FractionDeadToResidue=0
          OrganBiomassRemovalType Graze: FractionLiveToRemove=0.6; FractionDeadToRemove=0; FractionLiveToResidue=0.2; FractionDeadToResidue=0
          OrganBiomassRemovalType Thin: FractionLiveToRemove=0; FractionDeadToRemove=0; FractionLiveToResidue=0.05; FractionDeadToResidue=0
        MultiplyFunction MaintenanceRespirationFunction
          Memo
            Maintenance Respiration Function
          Constant MaintenanceFractionAt20C: FixedValue=0.01
          WangEngelTempFunction: MinTemp=-50; OptTemp=48; MaxTemp=60; RefTemp=20; MaximumTemperatureWeighting=0.5
        Constant DMConversionEfficiency: FixedValue=0.7067; Units=0-1
        Live Biomass
        Dead Biomass
      Root: GrowthRespiration=0; MaintenanceRespiration=0
        Constant KLModifier: FixedValue=1
        Constant SoilWaterEffect: FixedValue=1
        Constant MaxDailyNUptake: FixedValue=20
        Constant SenescenceRate: FixedValue=0.005
        Constant StructuralFraction: FixedValue=1
        Constant MaximumRootDepth: FixedValue=1000000
        Constant MaximumNConc: FixedValue=0.01
        Constant MinimumNConc: FixedValue=0.01
        PhaseBasedSwitch NitrogenDemandSwitch: Start=Germination; End=Maturity
        BiomassRemoval BiomassRemovalDefaults
          OrganBiomassRemovalType Harvest: FractionLiveToRemove=0; FractionDeadToRemove=0; FractionLiveToResidue=0.2; FractionDeadToResidue=0
          OrganBiomassRemovalType Cut: FractionLiveToRemove=0; FractionDeadToRemove=0; FractionLiveToResidue=0.3; FractionDeadToResidue=0
          OrganBiomassRemovalType Prune: FractionLiveToRemove=0; FractionDeadToRemove=0; FractionLiveToResidue=0.1; FractionDeadToResidue=0
          OrganBiomassRemovalType Graze: FractionLiveToRemove=0; FractionDeadToRemove=0; FractionLiveToResidue=0.15; FractionDeadToResidue=0
          OrganBiomassRemovalType Thin: FractionLiveToRemove=0; FractionDeadToRemove=0; FractionLiveToResidue=0.05; FractionDeadToResidue=0
        Constant KNO3: FixedValue=0.02
        Constant KNH4: FixedValue=0.01
        Constant InitialDM: FixedValue=0.005; Units=g/plant
        Constant SpecificRootLength: FixedValue=105; Units=m/g
        MultiplyFunction RootFrontVelocity
          PhaseLookup PotentialRootFrontVelocity
            PhaseLookupValue PreEmergence: Start=Germination; End=Emergence
              Constant Value: FixedValue=5; Units=mm/d
            PhaseLookupValue PostEmergence: Start=Emergence; End=Maturity
              Constant Value: FixedValue=20; Units=mm/d
          WeightedTemperatureFunction TemperatureFactor: MaximumTemperatureWeighting=0.5
            XYPairs: X=[0, 15, 25, 35]; Y=[0, 1, 1, 0]
          LinearInterpolationFunction WaterFactor: XProperty=[SoilWaterScale]
            SoilWaterScale
            XYPairs: X=[0, 0.25, 1]; Y=[0, 1, 1]
        LinearInterpolationFunction NUptakeSWFactor: XProperty=[SoilWaterScale]
          SoilWaterScale
          XYPairs: X=[0, 1]; Y=[0, 1]
          Memo
            This is modelled in the same way as the old wheat model where potential N uptake is decreased as the soil dries as described by NUptakeSWFactor
        PartitionFractionDemandFunction DMDemandFunction
          PhaseLookup PartitionFraction
            PhaseLookupValue PreEmergence: Start=Germination; End=Emergence
              Constant Value: FixedValue=0
            PhaseLookupValue PreFlowering: Start=Emergence; End=Flowering
              Constant Value: FixedValue=0.2
            PhaseLookupValue PostFlowering: Start=Flowering; End=EndGrainFill
              Constant Value: FixedValue=0.01
        MultiplyFunction MaintenanceRespirationFunction
          Memo
            Maintenance Respiration Function
          Constant MaintenanceFractionAt20C: FixedValue=0.02
          WangEngelTempFunction: MinTemp=-50; OptTemp=48; MaxTemp=60; RefTemp=20; MaximumTemperatureWeighting=0.5
        Constant DMConversionEfficiency: FixedValue=0.6925; Units=0-1
      Leaf: MaxCover=1; Albedo=0.25; Gsmax=0.011; R50=150; MicroClimatePresent=true; KDead=0.3; MaximumMainStemLeafNumber=30
        zero: GrowthRespiration, MaintenanceRespiration, CurrentExpandingLeaf, StartFractionExpanded, FractionNextleafExpanded, DeadNodesYesterday, FRGR, PotentialEP, TipsAtEmergence, CohortsAtInitialisation, FractionDied
        LeafCohort InitialLeaves[1]: Rank=1; Area=200
          zero: NReallocationFactor, DMReallocationFactor, NRetranslocationFactor, DMRetranslocationFactor, ShadeInducedSenRate, SenescedFrac, DeltaPotentialArea, DeltaStressConstrainedArea, DeltaCarbonConstrainedArea, PotentialStructuralDMAllocation, PotentialMetabolicDMAllocation, MetabolicNReallocated, MetabolicWtReallocated, StorageNReallocated, StorageWtReallocated, MetabolicNRetranslocated, StorageNRetrasnlocated, DMRetranslocated, MetabolicNAllocation, StructuralDMAllocation, MetabolicDMAllocation, MaintenanceRespiration
        LeafCohort InitialLeaves[2]: Rank=2
          zero: NReallocationFactor, DMReallocationFactor, NRetranslocationFactor, DMRetranslocationFactor, ShadeInducedSenRate, SenescedFrac, DeltaPotentialArea, DeltaStressConstrainedArea, DeltaCarbonConstrainedArea, PotentialStructuralDMAllocation, PotentialMetabolicDMAllocation, MetabolicNReallocated, MetabolicWtReallocated, StorageNReallocated, StorageWtReallocated, MetabolicNRetranslocated, StorageNRetrasnlocated, DMRetranslocated, MetabolicNAllocation, StructuralDMAllocation, MetabolicDMAllocation, Area, MaintenanceRespiration
        ArrayBiomass CohortArrayLive: Propertys=[[Leaf].Live]; ArraySize=[Leaf].MaxNodeNo
        ArrayBiomass CohortArrayDead: Propertys=[[Leaf].Dead]; ArraySize=[Leaf].MaxNodeNo
        LeafCohortParameters CohortParameters: ExpansionStressValue=0
          Constant NReallocationFactor: FixedValue=1
          Constant MaintenanceRespirationFunction: FixedValue=0
          Constant NRetranslocationFactor: FixedValue=0.03
          Constant DMReallocationFactor: FixedValue=0
          Constant DMRetranslocationFactor: FixedValue=0
          MinimumFunction CellDivisionStress
            LinearInterpolationFunction WaterStressEffect: XProperty=[Leaf].Fw
              XYPairs: X=[0.5, 1]; Y=[0.1, 1]
            LinearInterpolationFunction NitrogenStressEffect: XProperty=[Wheat].Leaf.Fn
              XYPairs: X=[0, 0.5, 1]; Y=[0.1, 0.1, 1]
          MinimumFunction ExpansionStress
            LinearInterpolationFunction WaterStressEffect: XProperty=[Root].WaterTensionFactor
              XYPairs: X=[0.1, 1, 1.3]; Y=[0, 1, 1]
            LinearInterpolationFunction TemperatureEffect: XProperty=[Phenology].MeanTemp.Value()
              XYPairs: X=[0, 12, 14]; Y=[0, 1, 1]
            LinearInterpolationFunction NitrogenStressEffect: XProperty=[Wheat].Leaf.Fn
              XYPairs: X=[0, 0.5, 1]; Y=[0.1, 0.1, 1]
          MultiplyFunction MaxArea
            Constant AreaLargestLeaves: FixedValue=2600; Units=mm^2
            LinearInterpolationFunction AgeFactor: XProperty=[Phenology].Stage
              XYPairs: X=[3, 3.45, 4]; Y=[0.1, 0.5, 1]
          MultiplyFunction GrowthDuration
            Constant Multiplier: FixedValue=1.3
            VariableReference Phyllochron: VariableName=[Structure].Phyllochron.Value()
          PhaseLookup LagDuration
            PhaseLookupValue beforeTerminalSpikelet: Start=Emergence; End=TerminalSpikelet
              MultiplyFunction beforeTerminalSpikelet
                VariableReference Phyllochron: VariableName=[Structure].Phyllochron.Value()
                Constant Multiplier: FixedValue=4
                LinearInterpolationFunction AgeFactor: XProperty=[Phenology].Stage
                  XYPairs: X=[3, 4]; Y=[1, 0.6]
            PhaseLookupValue afterTerminalSpikelet: Start=TerminalSpikelet; End=Maturity
              MultiplyFunction afterTerminalSpikelet
                LinearInterpolationFunction AgeFactor: XProperty=[Phenology].Stage
                  XYPairs: X=[3, 4, 4.01, 5]; Y=[0.4, 0.4, 0.4, 1]
                SubtractFunction LastLeafDuration
                  AddFunction ThermalTimeToRipe
                    VariableReference EarlyReproductive: VariableName=[Phenology].EarlyReproductive.Target.Value()
                    VariableReference GrainDevelopment: VariableName=[Phenology].GrainDevelopment.Target.Value()
                    VariableReference GrainFilling: VariableName=[Phenology].GrainFilling.Target.Value()
                    VariableReference Maturing: VariableName=[Phenology].Maturing.Target.Value()
                    VariableReference Ripening: VariableName=[Phenology].Ripening.Target.Value()
                  VariableReference SenescenceDuration: VariableName=[Leaf].CohortParameters.SenescenceDuration.Value()
          MultiplyFunction LagDuration_2
            LinearInterpolationFunction AgeFactor: XProperty=[Phenology].Stage
              XYPairs: X=[3, 4]; Y=[0.4, 1]
            SubtractFunction LastLeafDuration: same as Replacements.Wheat.Leaf.CohortParameters.LagDuration.afterTerminalSpikelet.afterTerminalSpikelet.LastLeafDuration
          MultiplyFunction SenescenceDuration
            Constant Multiplier: FixedValue=3
            VariableReference Phyllochron: VariableName=[Structure].Phyllochron.Value()
          Constant DetachmentLagDuration: FixedValue=1000000
          Constant DetachmentDuration: FixedValue=1000000
          Constant RelativeBranchLeafSize: FixedValue=1
          LinearInterpolationFunction MaximumNConc: XProperty=[Phenology].Stage
            XYPairs: X=[3, 4, 6]; Y=[0.1, 0.045, 0.02]
          MultiplyFunction CriticalNConc
            LinearInterpolationFunction CriticalNConcAt350ppm: XProperty=[Phenology].Stage
              XYPairs: X=[3, 4, 6]; Y=[0.09, 0.035, 0.015]
            LinearInterpolationFunction CO2Factor: XProperty=[IWeather].CO2
              XYPairs: X=[350, 700]; Y=[1, 0.93]
          LinearInterpolationFunction MinimumNConc: XProperty=[Phenology].Stage
            XYPairs: X=[3, 4, 6]; Y=[0.03, 0.005, 0.005]
          AddFunction DroughtInducedLagAcceleration
            Constant One: FixedValue=1
            MultiplyFunction Stress
              Constant StressResponseCoefficient: FixedValue=1
              LinearInterpolationFunction StressFactor: XProperty=[Leaf].Fw
                XYPairs: X=[0, 0.5]; Y=[0.5, 0]
          AddFunction DroughtInducedSenAcceleration: same as Replacements.Wheat.Leaf.CohortParameters.DroughtInducedLagAcceleration
          LinearInterpolationFunction SpecificLeafAreaMax: XProperty=[Phenology].Stage
            XYPairs: X=[3, 4]; Y=[18000, 30000]
          LinearInterpolationFunction SpecificLeafAreaMin: XProperty=[Leaf].Fn
            XYPairs: X=[0.4, 1]; Y=[10000, 18000]
          Constant InitialNConc: FixedValue=0
          Constant StructuralFraction: FixedValue=0.5
          Constant StorageFraction: FixedValue=0
          Constant LeafSizeShapeParameter: FixedValue=0.3
          Constant SenessingLeafRelativeSize: FixedValue=1; Units=0-1
          MultiplyFunction ShadeInducedSenescenceRate
            Constant RatePerDegDay: FixedValue=0
              Memo
                1% per degree day means it takes one phyllochron for a shaded leaf to fully sceness
            VariableReference ThermalTime: VariableName=[Phenology].ThermalTime.Value()
          ArrayFunction SenescenceDurationAgeMultiplier: Values=1 1 1
          ArrayFunction LeafSizeAgeMultiplier: Values=1 1 1 1 1 1 1 1 1 1 1 1
          ArrayFunction LagDurationAgeMultiplier: Values=1 1 1
        RUEModel Photosynthesis_RUE
          Constant RUE: FixedValue=2
          WeightedTemperatureFunction FT: MaximumTemperatureWeighting=0.75
            XYPairs: X=[0, 15, 25, 35]; Y=[0, 1, 1, 0]
          LinearInterpolationFunction FN: XProperty=[Leaf].Fn
            XYPairs: X=[0, 1, 1.5]; Y=[0, 1, 1]
          LinearInterpolationFunction FW: XProperty=[Leaf].Fw
            XYPairs: X=[0, 1, 1]; Y=[0, 1, 1]
          LinearInterpolationFunction FVPD: XProperty=[Photosynthesis_RUE].VPD
            XYPairs: X=[0, 10, 40]; Y=[1, 1, 0]
          RUECO2Function FCO2: PhotosyntheticPathway=C3
          VariableReference RadnInt: VariableName=[Leaf].RadIntTot
        LessThanFunction Photosynthesis_DCaPS
          VariableReference LAI: VariableName=[Leaf].LAI
          Constant: FixedValue=0.1
          RUEModel PhotosynthesisRUE
            Constant RUE: FixedValue=1.8
            WeightedTemperatureFunction FT: MaximumTemperatureWeighting=0.75
              XYPairs: X=[0, 15, 25, 35]; Y=[0, 1, 1, 0]
            LinearInterpolationFunction FN: XProperty=[Leaf].Fn
              XYPairs: X=[0, 1, 1.5]; Y=[0, 1, 1]
            LinearInterpolationFunction FW: XProperty=[Leaf].Fw
              XYPairs: X=[0, 1, 1]; Y=[0, 1, 1]
            LinearInterpolationFunction FVPD: XProperty=[Leaf].Photosynthesis_DCaPS.PhotosynthesisRUE.VPD
              XYPairs: X=[0, 10, 40]; Y=[1, 1, 0]
            RUECO2Function FCO2: PhotosyntheticPathway=C3
            VariableReference RadnInt: VariableName=[Leaf].RadIntTot
          Photosynthesis PhotosynthesisDCaps
            Constant Cmodel: FixedValue=3; Units=3 for C3, 4 for C4
            Constant MinLAI: FixedValue=0.1
            Constant RSR: FixedValue=0
            Constant LeafAngle: FixedValue=0
            Constant B: FixedValue=1
            Constant SLNRatioTop: FixedValue=1.32
            Constant psiVc: FixedValue=1.16; Units=μmol CO2 mmol-1 N s-1
            Constant psiJ: FixedValue=2.4; Units=μmol CO2 mmol-1 N s-1
            Constant psiRd: FixedValue=0.0116; Units=μmol CO2 mmol-1 N s-1
            Constant PsiFactor: FixedValue=1
            Constant Ca: FixedValue=400
            Constant CiCaRatio: FixedValue=0.7; Units=μbar
            Constant gm25: FixedValue=0.55; Units=mol CO2 m-2 ground s-1 bar-1
            Constant StructuralN: FixedValue=25
            Constant psiVp: FixedValue=0
            Constant gbs: FixedValue=0
            Constant Vpr: FixedValue=0
        CanopyPhotosynthesis Photosynthesis: GrossPhotosynthesis=0
          CanopyGrossPhotosynthesisHourly: KDIF=0.7
          LeafLightUseEfficiency: LUEref=0.6; pathway=C3
          LeafMaxGrossPhotosynthesis: Pgmmax=40; pathway=C3
            WangEngelTempFunction TemperatureResponse: MinTemp=0; OptTemp=27.5; MaxTemp=40; RefTemp=27.5; MaximumTemperatureWeighting=0.71
        Constant FrostFraction: FixedValue=0
        VariableReference ThermalTime: VariableName=[Phenology].ThermalTime.Value()
        MinimumFunction FRGRFunction
          VariableReference RUE_FT: VariableName=[Leaf].Photosynthesis.FT.Value()
          MinimumFunction Others
            VariableReference RUE_FN: VariableName=[Leaf].Photosynthesis.FN.Value()
            VariableReference RUE_FVPD: VariableName=[Leaf].Photosynthesis.FVPD.Value()
        BiomassRemoval BiomassRemovalDefaults
          OrganBiomassRemovalType Harvest: FractionLiveToRemove=0; FractionDeadToRemove=0; FractionLiveToResidue=0.3; FractionDeadToResidue=0.3
          OrganBiomassRemovalType Cut: FractionLiveToRemove=0.8; FractionDeadToRemove=0.8; FractionLiveToResidue=0; FractionDeadToResidue=0
          OrganBiomassRemovalType Prune: FractionLiveToRemove=0; FractionDeadToRemove=0; FractionLiveToResidue=0.6; FractionDeadToResidue=0.6
          OrganBiomassRemovalType Graze: FractionLiveToRemove=0.6; FractionDeadToRemove=0.6; FractionLiveToResidue=0.1; FractionDeadToResidue=0.1
          OrganBiomassRemovalType Thin: FractionLiveToRemove=0; FractionDeadToRemove=0; FractionLiveToResidue=0.05; FractionDeadToResidue=0.05
        Constant ExtinctionCoeff: FixedValue=0.5
        Constant StructuralFraction: FixedValue=0.5
        ApexTiller Apex
        Constant DMConversionEfficiency: FixedValue=0.6853
        MultiplyFunction MaintenanceRespirationFunction
          Memo
            Maintenance Respiration Function
          Constant MaintenanceFractionAt20C: FixedValue=0.03
          WangEngelTempFunction: MinTemp=-50; OptTemp=48; MaxTemp=60; RefTemp=20; MaximumTemperatureWeighting=0.5
        Constant DMConversionEfficiencyFunction: FixedValue=0.6853
      GenericOrgan Spike
        PopulationBasedDemandFunction DMDemandFunction
          VariableReference ThermalTime: VariableName=[Phenology].ThermalTime.Value()
          Constant ExpansionStress: FixedValue=1
          VariableReference OrganPopulation: VariableName=[Spike].HeadNumber.Value()
          Constant StartStage: FixedValue=5
          Constant MaximumOrganWt: FixedValue=0.5
          AddFunction GrowthDuration
            VariableReference EarlyReproductive: VariableName=[Phenology].EarlyReproductive.Target.Value()
            VariableReference GrainDevelopment: VariableName=[Phenology].GrainDevelopment.Target.Value()
        Constant NReallocationFactor: FixedValue=0
        Constant NRetranslocationFactor: FixedValue=0.3
        Constant MaximumNConc: FixedValue=0.025
          Constant MaximumNConc: FixedValue=0.025
        Constant StructuralFraction: FixedValue=0.9
        Constant SenescenceRate: FixedValue=0; Units=/d
        Constant MinimumNConc: FixedValue=0.004
        BiomassRemoval BiomassRemovalDefaults
          OrganBiomassRemovalType Harvest: FractionLiveToRemove=0.5; FractionDeadToRemove=0; FractionLiveToResidue=0.1; FractionDeadToResidue=0
          OrganBiomassRemovalType Cut: FractionLiveToRemove=0.8; FractionDeadToRemove=0; FractionLiveToResidue=0; FractionDeadToResidue=0
          OrganBiomassRemovalType Prune: FractionLiveToRemove=0; FractionDeadToRemove=0; FractionLiveToResidue=0.6; FractionDeadToResidue=0
          OrganBiomassRemovalType Graze: FractionLiveToRemove=0.6; FractionDeadToRemove=0; FractionLiveToResidue=0.2; FractionDeadToResidue=0
          OrganBiomassRemovalType Thin: FractionLiveToRemove=0; FractionDeadToRemove=0; FractionLiveToResidue=0.05; FractionDeadToResidue=0
        PhaseBasedSwitch NitrogenDemandSwitch: Start=Emergence; End=StartGrainFill
        PhaseLookup DMRetranslocationFactor
          PhaseLookupValue VegetativeGrowth: Start=Emergence; End=StartGrainFill
            Constant DMRetranslocationFactor: FixedValue=0
          PhaseLookupValue ReproductiveGrowth: Start=StartGrainFill; End=EndGrainFill
            Constant DMRetranslocationFactor: FixedValue=0.5
        Constant InitialWtFunction: FixedValue=0; Units=g/m^2
        Constant DetachmentRateFunction: FixedValue=0; Units=/d
        VariableReference HeadNumber: VariableName=[Structure].TotalStemPopn
        Constant DMReallocationFactor: FixedValue=0
        VariableReference CriticalNConc: VariableName=[Spike].MinimumNConc.Value()
        MultiplyFunction MaintenanceRespirationFunction: same as Replacements.Wheat.Grain.MaintenanceRespirationFunction
        Constant DMConversionEfficiency: FixedValue=0.7067; Units=0-1
        Constant Photosynthesis: FixedValue=0; Units=g/m^2
      GenericOrgan Stem
        PhaseLookup StructuralFraction
          PhaseLookupValue VegetativeGrowth: Start=Sowing; End=FlagLeaf
            Constant Fraction: FixedValue=0.7
          PhaseLookupValue Reproductive: Start=FlagLeaf; End=Flowering
            Constant Fraction: FixedValue=0.7
          PhaseLookupValue GrainFilling: Start=Flowering; End=HarvestRipe
            Constant Fraction: FixedValue=0.05
        Constant SenescenceRate: FixedValue=0; Units=/d
        LinearInterpolationFunction MaximumNConc: XProperty=[Phenology].Stage
          XYPairs: X=[3, 4, 5, 6]; Y=[0.07, 0.04, 0.01, 0.01]
            XYPairs: X=[3, 4, 5, 6]; Y=[0.07, 0.03, 0.01, 0.01]
        Constant MinimumNConc: FixedValue=0.0025
        PhaseBasedSwitch NitrogenDemandSwitch: Start=Emergence; End=StartGrainFill
        Constant NReallocationFactor: FixedValue=0
        PhaseLookup NRetranslocationFactor
          PhaseLookupValue VegetativeGrowth: Start=Sowing; End=Flowering
            Constant Fraction: FixedValue=0
          PhaseLookupValue ReproductiveGrowth: Start=Flowering; End=HarvestRipe
            Constant Fraction: FixedValue=0.5
        PhaseLookup DMRetranslocationFactor: same as Replacements.Wheat.Spike.DMRetranslocationFactor
        PartitionFractionDemandFunction DMDemandFunction
          PhaseLookup PartitionFraction
            PhaseLookupValue PreStemElongation: Start=Emergence; End=TerminalSpikelet
              Constant StemFraction: FixedValue=0.4
            PhaseLookupValue StemElongation: Start=TerminalSpikelet; End=FlagLeaf
              Constant StemFraction: FixedValue=0.6
            PhaseLookupValue EarEmergence: Start=FlagLeaf; End=Flowering
              Constant StemFraction: FixedValue=0.6
        BiomassRemoval BiomassRemovalDefaults: same as Replacements.Wheat.Spike.BiomassRemovalDefaults
        DivideFunction PercentWSC
          VariableReference WSC: VariableName=[Stem].Live.StorageWt
          VariableReference StemWt: VariableName=[Stem].Live.Wt
        Constant InitialWtFunction: FixedValue=0; Units=g/m^2
        Constant DetachmentRateFunction: FixedValue=0; Units=/d
        Constant DMReallocationFactor: FixedValue=0
        VariableReference CriticalNConc: VariableName=[Stem].MinimumNConc.Value()
        Constant DMConversionEfficiency: FixedValue=0.66; Units=0-1
        MultiplyFunction MaintenanceRespirationFunction: same as Replacements.Wheat.Root.MaintenanceRespirationFunction
        Constant Photosynthesis: FixedValue=0; Units=g/m^2
      CompositeBiomass AboveGround
        Propertys=[[Leaf].Live, [Leaf].Dead, [Stem].Live, [Stem].Dead, [Spike].Live, [Spike].Dead, [Grain].Live, [Grain].Dead]
      CompositeBiomass AboveGroundLive: Propertys=[[Leaf].Live, [Stem].Live, [Spike].Live, [Grain].Live]
      CompositeBiomass AboveGroundDead: Propertys=[[Leaf].Dead, [Stem].Dead, [Spike].Dead, [Grain].Dead]
      CompositeBiomass BelowGround: Propertys=[[Root].Live, [Root].Dead]
      CompositeBiomass Total
        Propertys=[[Leaf].Live, [Leaf].Dead, [Stem].Live, [Stem].Dead, [Root].Live, [Root].Dead, [Spike].Live, [Spike].Dead, [Grain].Live, [Grain].Dead]
      CompositeBiomass TotalLive
        Propertys=[[Leaf].Live, [Stem].Live, [Root].Live, [Spike].Live, [Grain].Live]
      CompositeBiomass TotalDead
        Propertys=[[Leaf].Dead, [Stem].Dead, [Root].Dead, [Spike].Dead, [Grain].Dead]
      CompositeBiomass Ear: Propertys=[[Spike].Live, [Grain].Live, [Spike].Dead, [Grain].Dead]
        Memo
          The Ear composite biomass object includes the Live and dead pools of all organs within the Ear to allow output for total dry matter and Nutrient contents, including total structural, non-structural and metabolic pools.
      CompositeBiomass StemPlusSpike: Propertys=[[Stem].Live, [Spike].Live, [Stem].Dead, [Spike].Dead]
      CultivarFolder Cultivars
        CultivarFolder New Zealand
          Cultivar Alberic
            Command:
              [Phenology].MinimumLeafNumber.FixedValue = 9
              [Phenology].VrnSensitivity.FixedValue = 7
              [Phenology].PpSensitivity.FixedValue = 3
          Cultivar Amarok
            Command:
              [Phenology].MinimumLeafNumber.FixedValue = 9
              [Phenology].VrnSensitivity.FixedValue = 10
              [Phenology].PpSensitivity.FixedValue = 6
              [Phenology].EarlyReproductivePpSensitivity.FixedValue = 5
              [Structure].Phyllochron.BasePhyllochron.FixedValue = 80
          Cultivar Aspiring
            Command:
              [Phenology].MinimumLeafNumber.FixedValue = 9
              [Phenology].VrnSensitivity.FixedValue = 7
              [Phenology].PpSensitivity.FixedValue = 3
          Cultivar BattenWinter
            Command:
              [Phenology].MinimumLeafNumber.FixedValue = 8
              [Phenology].VrnSensitivity.FixedValue = 8
              [Phenology].PpSensitivity.FixedValue = 5
              [Phenology].EarlyReproductivePpSensitivity.FixedValue = 3
              [Structure].Phyllochron.BasePhyllochron.FixedValue = 100
              [Leaf].ExtinctionCoeff.FixedValue = 0.7
          Cultivar BattenSpring
            Command:
              [Phenology].MinimumLeafNumber.FixedValue = 7
              [Phenology].VrnSensitivity.FixedValue = 0
              [Phenology].PpSensitivity.FixedValue = 5
              [Phenology].EarlyReproductivePpSensitivity.FixedValue = 3
              [Structure].Phyllochron.BasePhyllochron.FixedValue = 100
              [Leaf].ExtinctionCoeff.FixedValue = 0.7
          Cultivar Centaur
            Command:
              [Phenology].MinimumLeafNumber.FixedValue = 9
              [Phenology].VrnSensitivity.FixedValue = 7
              [Phenology].PpSensitivity.FixedValue = 3
          Cultivar Claire
            Command:
              [Phenology].MinimumLeafNumber.FixedValue = 8
              [Phenology].VrnSensitivity.FixedValue = 8
              [Phenology].PpSensitivity.FixedValue = 8
              [Phenology].EarlyReproductivePpSensitivity.FixedValue = 3
              [Structure].Phyllochron.BasePhyllochron.FixedValue = 100
          Cultivar Conquest
            Command:
              [Phenology].MinimumLeafNumber.FixedValue = 7
              [Phenology].VrnSensitivity.FixedValue = 0
              [Phenology].PpSensitivity.FixedValue = 3
              [Structure].Phyllochron.BasePhyllochron.FixedValue = 100
          Cultivar Discovery
            Command:
              [Phenology].MinimumLeafNumber.FixedValue = 8.5
              [Phenology].VrnSensitivity.FixedValue = 0
              [Phenology].PpSensitivity.FixedValue = 0
              [Structure].Phyllochron.BasePhyllochron.FixedValue = 80
              [Leaf].CohortParameters.MaxArea.AreaLargestLeaves.FixedValue = 1600
              [Grain].MaximumPotentialGrainSize.FixedValue = 0.051
              [Grain].NumberFunction.GrainNumber.GrainsPerGramOfStem.FixedValue = 25
              [Leaf].ExtinctionCoeff.FixedValue = 0.5
              [Structure].BranchingRate.PotentialBranchingRate.Vegetative.PotentialBranchingRate.XYPairs.Y = 0,0,0,0,4,7,12,20
            Memo
              This is a spring wheat with a high grain number and later tillering
          Cultivar Einstein
            Command:
              [Phenology].MinimumLeafNumber.FixedValue = 9
              [Phenology].VrnSensitivity.FixedValue = 7
              [Phenology].PpSensitivity.FixedValue = 3
          Cultivar Exceed
            Command:
              [Phenology].MinimumLeafNumber.FixedValue = 9
              [Phenology].VrnSensitivity.FixedValue = 7
              [Phenology].PpSensitivity.FixedValue = 3
          Cultivar Majestic
            Command:
              [Phenology].MinimumLeafNumber.FixedValue = 9
              [Phenology].VrnSensitivity.FixedValue = 7
              [Phenology].PpSensitivity.FixedValue = 3
          Cultivar Option
            Command:
              [Phenology].MinimumLeafNumber.FixedValue = 9
              [Phenology].VrnSensitivity.FixedValue = 7
              [Phenology].PpSensitivity.FixedValue = 3
          Cultivar Otane
            Command:
              [Phenology].MinimumLeafNumber.FixedValue = 6
              [Phenology].VrnSensitivity.FixedValue = 0
              [Phenology].PpSensitivity.FixedValue = 4
              [Phenology].EarlyReproductivePpSensitivity.FixedValue = 2
              [Structure].Phyllochron.BasePhyllochron.FixedValue = 100
          Cultivar Pennant
            Command:
              [Phenology].MinimumLeafNumber.FixedValue = 9
              [Phenology].VrnSensitivity.FixedValue = 7
              [Phenology].PpSensitivity.FixedValue = 3
          Cultivar Regency
            Command:
              [Phenology].MinimumLeafNumber.FixedValue = 9
              [Phenology].VrnSensitivity.FixedValue = 7
              [Phenology].PpSensitivity.FixedValue = 3
          Cultivar Richmond
            Command:
              [Phenology].MinimumLeafNumber.FixedValue = 9
              [Phenology].VrnSensitivity.FixedValue = 7
              [Phenology].PpSensitivity.FixedValue = 3
          Cultivar Robigus
            Command:
              [Phenology].MinimumLeafNumber.FixedValue = 9
              [Phenology].VrnSensitivity.FixedValue = 7
              [Phenology].PpSensitivity.FixedValue = 3
          Cultivar Rongotea
            Command:
              [Phenology].MinimumLeafNumber.FixedValue = 7
              [Phenology].VrnSensitivity.FixedValue = 0
              [Phenology].PpSensitivity.FixedValue = 2
              [Phenology].EarlyReproductivePpSensitivity.FixedValue = 3
              [Structure].Phyllochron.BasePhyllochron.FixedValue = 100
          Cultivar Rubric
            Command:
              [Phenology].MinimumLeafNumber.FixedValue = 9
              [Phenology].VrnSensitivity.FixedValue = 7
              [Phenology].PpSensitivity.FixedValue = 3
          Cultivar Sage
            Command:
              [Phenology].MinimumLeafNumber.FixedValue = 9
              [Phenology].VrnSensitivity.FixedValue = 7
              [Phenology].PpSensitivity.FixedValue = 3
          Cultivar Saracen
            Command:
              [Phenology].MinimumLeafNumber.FixedValue = 9
              [Phenology].VrnSensitivity.FixedValue = 7
              [Phenology].PpSensitivity.FixedValue = 3
          Cultivar Savannah
            Command:
              [Phenology].MinimumLeafNumber.FixedValue = 9
              [Phenology].VrnSensitivity.FixedValue = 7
              [Phenology].PpSensitivity.FixedValue = 3
          Cultivar Solstice
            Command:
              [Phenology].MinimumLeafNumber.FixedValue = 9
              [Phenology].VrnSensitivity.FixedValue = 7
              [Phenology].PpSensitivity.FixedValue = 3
          Cultivar Tanker
            Command:
              [Phenology].MinimumLeafNumber.FixedValue = 9
              [Phenology].VrnSensitivity.FixedValue = 7
              [Phenology].PpSensitivity.FixedValue = 3
          Cultivar Tribute
            Command:
              [Phenology].MinimumLeafNumber.FixedValue = 9
              [Phenology].VrnSensitivity.FixedValue = 7
              [Phenology].PpSensitivity.FixedValue = 3
          Cultivar Wakanui
            Command:
              [Phenology].MinimumLeafNumber.FixedValue = 8
              [Phenology].VrnSensitivity.FixedValue = 10
              [Phenology].PpSensitivity.FixedValue = 0
              [Phenology].EarlyReproductiveLongDayBase.FixedValue = 4
              [Structure].Phyllochron.BasePhyllochron.FixedValue = 100
              [Phenology].DailyVernalisation.TempResponseProfile.XYPairs.X = 0,1,8
              [Phenology].DailyVernalisation.TempResponseProfile.XYPairs.Y = 0,1.204,0
              [Leaf].ExtinctionCoeff.FixedValue = 0.7
              [Grain].NumberFunction.GrainNumber.GrainsPerGramOfStem.FixedValue = 17
              [Leaf].CohortParameters.MaxArea.AreaLargestLeaves.FixedValue = 3000
          Cultivar Weston
            Command:
              [Phenology].MinimumLeafNumber.FixedValue = 9
              [Phenology].VrnSensitivity.FixedValue = 7
              [Phenology].PpSensitivity.FixedValue = 3
        CultivarFolder Australia
          Cultivar Axe
            Command:
              [Phenology].MinimumLeafNumber.FixedValue = 5
              [Phenology].VrnSensitivity.FixedValue = 0
              [Phenology].PpSensitivity.FixedValue = 4
              [Phenology].EarlyReproductivePpSensitivity.FixedValue = 0
              [Structure].Phyllochron.BasePhyllochron.FixedValue = 100
          Cultivar Bolac
            Command:
              [Phenology].MinimumLeafNumber.FixedValue = 6
              [Phenology].VrnSensitivity.FixedValue = 0
              [Phenology].PpSensitivity.FixedValue = 4
              [Structure].Phyllochron.BasePhyllochron.FixedValue = 100
          Cultivar Cunningham
            Command:
              [Phenology].MinimumLeafNumber.FixedValue = 6
              [Phenology].VrnSensitivity.FixedValue = 0
              [Phenology].PpSensitivity.FixedValue = 4
              [Structure].Phyllochron.BasePhyllochron.FixedValue = 100
            Alias Anlace
            Alias Arrivato
            Alias Babbler
            Alias Barham
            Alias Baxter
            Alias Bowie
            Alias Buckley
            Alias Buckly
            Alias Burunga
            Alias Camm
            Alias Carinya
            Alias ChiefCLPlus
            Alias CLF_Janz
            Alias Dagger
            Alias DBAAurora
            Alias ElmoreCLPlus
            Alias Espada
            Alias Frame
            Alias Gazelle
            Alias Halberd
            Alias Hybrid_Meteor
            Alias JusticaCLPlus
            Alias Preston
            Alias Saphire
            Alias Scout
            Alias Stiletto
            Alias Ventura
            Alias Wallup
          Cultivar Derrimut
            Command:
              [Phenology].MinimumLeafNumber.FixedValue = 6
              [Phenology].VrnSensitivity.FixedValue = 0
              [Phenology].PpSensitivity.FixedValue = 4
              [Structure].Phyllochron.BasePhyllochron.FixedValue = 100
          Cultivar EGAGregory
            Command:
              [Phenology].MinimumLeafNumber.FixedValue = 6
              [Phenology].VrnSensitivity.FixedValue = 4
              [Phenology].PpSensitivity.FixedValue = 3.5
              [Structure].Phyllochron.BasePhyllochron.FixedValue = 85
              [Phenology].GrainFilling.Target.FixedValue = 740
            Alias Gregory
            Alias Lancer
          Cultivar GattonHartog
            Command:
              [Phenology].MinimumLeafNumber.FixedValue = 8
              [Phenology].VrnSensitivity.FixedValue = 0
              [Phenology].PpSensitivity.FixedValue = 4
          Cultivar Gamenya
            Command:
              [Phenology].MinimumLeafNumber.FixedValue = 5
              [Phenology].VrnSensitivity.FixedValue = 0
              [Phenology].PpSensitivity.FixedValue = 3.5
              [Structure].Phyllochron.BasePhyllochron.FixedValue = 100
              [Phenology].EarlyReproductivePpSensitivity.FixedValue = 0
              [Phenology].EarlyReproductiveLongDayBase.FixedValue
          Cultivar Gauntlet
            Command:
              [Phenology].MinimumLeafNumber.FixedValue = 5
              [Phenology].VrnSensitivity.FixedValue = 0
              [Phenology].PpSensitivity.FixedValue = 4
              [Structure].Phyllochron.BasePhyllochron.FixedValue = 100
            Alias Braewood
            Alias Chara
            Alias Clearfield_stl
            Alias Drysdale
            Alias Envoy
            Alias Estoc
            Alias Giles
            Alias Harper
            Alias Krichauff
            Alias Magenta
            Alias Mitch
            Alias Phantom
            Alias Pugsley
            Alias Sentinel
            Alias Silverstar
            Alias Suneca
            Alias Sunlin
            Alias Sunvale
            Alias Trojan
            Alias Strzelecki
          Cultivar Gladius
            Command:
              [Phenology].MinimumLeafNumber.FixedValue = 6
              [Phenology].VrnSensitivity.FixedValue = 0
              [Phenology].PpSensitivity.FixedValue = 5
              [Structure].Phyllochron.BasePhyllochron.FixedValue = 100
          Cultivar Gutha
            Command:
              [Phenology].MinimumLeafNumber.FixedValue = 6
              [Phenology].VrnSensitivity.FixedValue = 0
              [Phenology].PpSensitivity.FixedValue = 5
              [Structure].Phyllochron.BasePhyllochron.FixedValue = 100
              [Grain].MaximumPotentialGrainSize.FixedValue = 0.041
              [Grain].NumberFunction.GrainNumber.GrainsPerGramOfStem.FixedValue = 17
          Cultivar H45
            Command:
              [Phenology].MinimumLeafNumber.FixedValue = 6
              [Phenology].VrnSensitivity.FixedValue = 0
              [Phenology].PpSensitivity.FixedValue = 4
              [Structure].Phyllochron.BasePhyllochron.FixedValue = 100
            Alias Saintly
            Alias Tamarinrock
            Alias Waagin
            Alias Wollaroi
            Alias Zippy
          Cultivar H46
            Command:
              [Phenology].MinimumLeafNumber.FixedValue = 8
              [Phenology].VrnSensitivity.FixedValue = 0
              [Phenology].PpSensitivity.FixedValue = 4
              [Structure].Phyllochron.BasePhyllochron.FixedValue = 100
          Cultivar Hartog
            Command:
              [Phenology].MinimumLeafNumber.FixedValue = 6
              [Phenology].VrnSensitivity.FixedValue = 3.2
              [Phenology].PpSensitivity.FixedValue = 3
              [Structure].Phyllochron.BasePhyllochron.FixedValue = 80
              [Grain].MaximumPotentialGrainSize.FixedValue = 0.041
              [Phenology].GrainFilling.Target.FixedValue = 740
              [Grain].MaximumPotentialGrainSize.FixedValue = 0.060
            Alias Annuello
            Alias Carnamah
            Alias Catalina
            Alias CLF_Stiletto
            Alias Cobra
            Alias Corack
            Alias Correll
            Alias Diamondbird
            Alias Gladius
            Alias Goroke
            Alias GrenadeCLPlus
            Alias Guardian
            Alias Halbred
            Alias Impala
            Alias Justica
            Alias Kord
            Alias Merlin
            Alias Mitre
            Alias Peake
            Alias Shield
            Alias Spitfire
            Alias Sunguard
            Alias Sunstate
            Alias Yallaroi
            Alias Yawa
            Alias Yitpi
          Cultivar Hibred_Mercury
            Command:
              [Phenology].MinimumLeafNumber.FixedValue = 6
              [Phenology].VrnSensitivity.FixedValue = 0
              [Phenology].PpSensitivity.FixedValue = 4
              [Structure].Phyllochron.BasePhyllochron.FixedValue = 100
            Alias Agtscythe
            Alias Arrino
            Alias Bonnie_rock
            Alias Bowerbird
            Alias Condo
            Alias Dart
            Alias Dollarbird
            Alias Emurock
            Alias Hyperno
            Alias ImposeCLPlus
            Alias Kalka
            Alias Kirchauff
            Alias Kukri
            Alias Hunter
            Alias LRPBArrow
            Alias Mace
            Alias Ouyen
            Alias Ruby
            Alias Tamaroi
            Alias Young
            Alias Katana
          Cultivar Janz
            Command:
              [Phenology].MinimumLeafNumber.FixedValue = 6
              [Phenology].VrnSensitivity.FixedValue = 1
              [Phenology].PpSensitivity.FixedValue = 4
              [Structure].Phyllochron.BasePhyllochron.FixedValue = 100
          Cultivar Kelallac
            Command:
              [Phenology].MinimumLeafNumber.FixedValue = 8
              [Phenology].VrnSensitivity.FixedValue = 0
              [Phenology].PpSensitivity.FixedValue = 4
              [Structure].Phyllochron.BasePhyllochron.FixedValue = 100
            Alias Beaufort
            Alias Calingiri
            Alias Endure
            Alias Forrest
            Alias Scenario
            Alias Zen
          Cultivar Kennedy
            Command:
              [Phenology].MinimumLeafNumber.FixedValue = 8
              [Phenology].VrnSensitivity.FixedValue = 0
              [Phenology].PpSensitivity.FixedValue = 4
              [Structure].Phyllochron.BasePhyllochron.FixedValue = 100
          Cultivar Lang
            Command:
              [Phenology].MinimumLeafNumber.FixedValue = 6
              [Phenology].VrnSensitivity.FixedValue = 0
              [Phenology].PpSensitivity.FixedValue = 5
              [Structure].Phyllochron.BasePhyllochron.FixedValue = 100
          Cultivar Livingston
            Command:
              [Phenology].MinimumLeafNumber.FixedValue = 5
              [Phenology].VrnSensitivity.FixedValue = 0
              [Phenology].PpSensitivity.FixedValue = 4
              [Structure].Phyllochron.BasePhyllochron.FixedValue = 100
          Cultivar Lincoln
            Command:
              [Phenology].MinimumLeafNumber.FixedValue = 6
              [Phenology].VrnSensitivity.FixedValue = 0
              [Phenology].PpSensitivity.FixedValue = 4
              [Structure].Phyllochron.BasePhyllochron.FixedValue = 100
            Alias Crusader
          Cultivar Mace
            Command:
              [Phenology].MinimumLeafNumber.FixedValue = 6
              [Phenology].VrnSensitivity.FixedValue = 0
              [Phenology].PpSensitivity.FixedValue = 4
              [Structure].Phyllochron.BasePhyllochron.FixedValue = 100
          Cultivar MacKellar
            Command:
              [Phenology].MinimumLeafNumber.FixedValue = 7
              [Phenology].VrnSensitivity.FixedValue = 5
              [Phenology].PpSensitivity.FixedValue = 5
              [Phenology].EarlyReproductiveLongDayBase.FixedValue = 3.5
              [Structure].Phyllochron.BasePhyllochron.FixedValue = 100
            Alias Adagio
            Alias Brennan
            Alias Declic
            Alias Revenue
          Cultivar Matong
            Command:
              [Phenology].MinimumLeafNumber.FixedValue = 7
              [Phenology].VrnSensitivity.FixedValue = 1
              [Phenology].PpSensitivity.FixedValue = 4
              [Structure].Phyllochron.BasePhyllochron.FixedValue = 100
          Cultivar McCubbin
            Command:
              [Phenology].MinimumLeafNumber.FixedValue = 8
              [Phenology].VrnSensitivity.FixedValue = 0
              [Phenology].PpSensitivity.FixedValue = 5
              [Structure].Phyllochron.BasePhyllochron.FixedValue = 90
          Cultivar Mercury
            Command:
              [Phenology].MinimumLeafNumber.FixedValue = 7
              [Phenology].VrnSensitivity.FixedValue = 0
              [Phenology].PpSensitivity.FixedValue = 4
              [Phenology].EarlyReproductiveLongDayBase.FixedValue = 3.5
              [Structure].Phyllochron.BasePhyllochron.FixedValue = 80
          Cultivar Ruby
            Command:
              [Phenology].MinimumLeafNumber.FixedValue = 8
              [Phenology].VrnSensitivity.FixedValue = 0
              [Phenology].PpSensitivity.FixedValue = 4
              [Structure].Phyllochron.BasePhyllochron.FixedValue = 100
          Cultivar Spear
            Command:
              [Phenology].MinimumLeafNumber.FixedValue = 6
              [Phenology].VrnSensitivity.FixedValue = 0
              [Phenology].PpSensitivity.FixedValue = 4
              [Structure].Phyllochron.BasePhyllochron.FixedValue = 100
              [Grain].MaximumPotentialGrainSize.FixedValue = 0.045
          Cultivar Sunbri
            Command:
              [Phenology].MinimumLeafNumber.FixedValue = 7
              [Phenology].VrnSensitivity.FixedValue = 0
              [Phenology].PpSensitivity.FixedValue = 5
              [Structure].Phyllochron.BasePhyllochron.FixedValue = 100
          Cultivar Sunco
            Command:
              [Phenology].MinimumLeafNumber.FixedValue = 6.5
              [Phenology].VrnSensitivity.FixedValue = 0
              [Phenology].PpSensitivity.FixedValue = 3.5
              [Phenology].EarlyReproductivePpSensitivity.FixedValue = 4
              [Structure].Phyllochron.BasePhyllochron.FixedValue = 100
            Alias Advantage
            Alias Bellaroi
            Alias Caparoi
            Alias Ellison
            Alias Suntop
          Cultivar Ventura
            Command:
              [Phenology].MinimumLeafNumber.FixedValue = 8
              [Phenology].VrnSensitivity.FixedValue = 0
              [Phenology].PpSensitivity.FixedValue = 4
              [Structure].Phyllochron.BasePhyllochron.FixedValue = 100
          Cultivar Wedgetail
            Command:
              [Phenology].MinimumLeafNumber.FixedValue = 8
              [Phenology].VrnSensitivity.FixedValue = 0
              [Phenology].PpSensitivity.FixedValue = 4
              [Structure].Phyllochron.BasePhyllochron.FixedValue = 100
            Alias Lorikeet
            Alias Rosella
            Alias Whistler
            Alias Wylah
            Alias Eaglehawk
          Cultivar Westonia
            Command:
              [Phenology].MinimumLeafNumber.FixedValue = 5
              [Phenology].VrnSensitivity.FixedValue = 0
              [Phenology].PpSensitivity.FixedValue = 4
              [Structure].Phyllochron.BasePhyllochron.FixedValue = 100
          Cultivar Wilgoyne
            Command:
              [Phenology].MinimumLeafNumber.FixedValue = 5
              [Phenology].VrnSensitivity.FixedValue = 0
              [Phenology].PpSensitivity.FixedValue = 4
              [Structure].Phyllochron.BasePhyllochron.FixedValue = 100
              [Grain].NumberFunction.GrainNumber.GrainsPerGramOfStem.FixedValue = 20
              [Grain].MaximumPotentialGrainSize.FixedValue = 0.045
          Cultivar Wyalkatchem
            Command:
              [Phenology].MinimumLeafNumber.FixedValue = 8
              [Phenology].VrnSensitivity.FixedValue = 0
              [Phenology].PpSensitivity.FixedValue = 4
              [Structure].Phyllochron.BasePhyllochron.FixedValue = 100
          Cultivar Yitpi
            Command:
              [Phenology].MinimumLeafNumber.FixedValue = 8
              [Phenology].VrnSensitivity.FixedValue = 0
              [Phenology].PpSensitivity.FixedValue = 5
              [Phenology].EarlyReproductiveLongDayBase.FixedValue = 2.5
              [Phenology].EarlyReproductivePpSensitivity.FixedValue = 5
              [Structure].Phyllochron.BasePhyllochron.FixedValue = 80
          Cultivar Young
            Command:
              [Phenology].MinimumLeafNumber.FixedValue = 8
              [Phenology].VrnSensitivity.FixedValue = 0
              [Phenology].PpSensitivity.FixedValue = 4
              [Structure].Phyllochron.BasePhyllochron.FixedValue = 100
          Cultivar 7770
            Command:
              [Phenology].MinimumLeafNumber.FixedValue = 6
              [Phenology].VrnSensitivity.FixedValue = 2.5
              [Phenology].PpSensitivity.FixedValue = 2
              [Structure].Phyllochron.BasePhyllochron.FixedValue = 80
              [Grain].MaximumPotentialGrainSize.FixedValue = 0.041
              [Phenology].GrainFilling.Target.FixedValue = 650
              [Grain].MaximumPotentialGrainSize.FixedValue = 0.060
              [Structure].BranchingRate.PotentialBranchingRate.Vegetative.PotentialBranchingRate.XYPairs.Y = 0,1,1,2,1.8,0,0,0,0
          Cultivar 7770tin
            Command:
              [Phenology].MinimumLeafNumber.FixedValue = 6
              [Phenology].VrnSensitivity.FixedValue = 2.5
              [Phenology].PpSensitivity.FixedValue = 2
              [Structure].Phyllochron.BasePhyllochron.FixedValue = 80
              [Grain].MaximumPotentialGrainSize.FixedValue = 0.041
              [Phenology].GrainFilling.Target.FixedValue = 650
              [Grain].MaximumPotentialGrainSize.FixedValue = 0.060
              [Structure].BranchingRate.PotentialBranchingRate.Vegetative.PotentialBranchingRate.XYPairs.Y = 0,1,1,1,0,0,0,0,0
        CultivarFolder Turkey
          Cultivar Konya
            Command:
              [Phenology].MinimumLeafNumber.FixedValue = 7
              [Phenology].VrnSensitivity.FixedValue = 0
              [Phenology].PpSensitivity.FixedValue = 4
              [Structure].Phyllochron.BasePhyllochron.FixedValue = 100
              [Grain].NumberFunction.GrainNumber.GrainsPerGramOfStem.FixedValue = 15
              [Grain].MaximumPotentialGrainSize.FixedValue = 0.050
              [Grain].MaximumNConc.FixedValue = 0.026
              [Phenology].GrainFilling.Target.FixedValue = 800
        CultivarFolder China
          Cultivar Keyu13
            Command:
              [Phenology].MinimumLeafNumber.FixedValue = 7
              [Phenology].VrnSensitivity.FixedValue = 5
              [Phenology].PpSensitivity.FixedValue = 3
              [Structure].Phyllochron.BasePhyllochron.FixedValue = 100
        CultivarFolder USA
          Cultivar Yecora
            Command:
              [Phenology].MinimumLeafNumber.FixedValue = 6
              [Phenology].VrnSensitivity.FixedValue = 0
              [Phenology].PpSensitivity.FixedValue = 4
              [Structure].Phyllochron.BasePhyllochron.FixedValue = 90
              [Leaf].CohortParameters.MaxArea.AreaLargestLeaves.FixedValue = 4000
          Cultivar Rex
            Command:
              [Phenology].MinimumLeafNumber.FixedValue = 7
              [Phenology].VrnSensitivity.FixedValue = 6
              [Phenology].PpSensitivity.FixedValue = 4
              [Grain].NumberFunction.GrainNumber.GrainsPerGramOfStem.FixedValue = 18
              [Grain].MaximumNConc.FixedValue = 0.02
          Cultivar Nugaines
            Command:
              [Phenology].MinimumLeafNumber.FixedValue = 7
              [Phenology].VrnSensitivity.FixedValue = 6
              [Phenology].PpSensitivity.FixedValue = 4
              [Grain].NumberFunction.GrainNumber.GrainsPerGramOfStem.FixedValue = 20
              [Grain].MaximumNConc.FixedValue = 0.02
          Cultivar Hyslop
            Command:
              [Phenology].MinimumLeafNumber.FixedValue = 7
              [Phenology].VrnSensitivity.FixedValue = 6
              [Phenology].PpSensitivity.FixedValue = 4
              [Grain].NumberFunction.GrainNumber.GrainsPerGramOfStem.FixedValue = 22
              [Grain].MaximumNConc.FixedValue = 0.02
          Cultivar Stephens
            Command:
              [Phenology].MinimumLeafNumber.FixedValue = 7
              [Phenology].VrnSensitivity.FixedValue = 6
              [Phenology].PpSensitivity.FixedValue = 4
              [Grain].NumberFunction.GrainNumber.GrainsPerGramOfStem.FixedValue = 25
              [Grain].MaximumNConc.FixedValue = 0.02
        CultivarFolder Europe
          Cultivar Dekan
            Command:
              [Phenology].MinimumLeafNumber.FixedValue = 9
              [Phenology].VrnSensitivity.FixedValue = 7
              [Phenology].PpSensitivity.FixedValue = 3
              [Phenology].EarlyReproductivePpSensitivity.FixedValue = 3
              [Structure].Phyllochron.BasePhyllochron.FixedValue = 100
              [Leaf].ExtinctionCoeff.FixedValue = 0.8
          Cultivar Rosario
            Command:
              [Phenology].MinimumLeafNumber.FixedValue = 9
              [Phenology].VrnSensitivity.FixedValue = 7
              [Phenology].PpSensitivity.FixedValue = 3
              [Phenology].EarlyReproductivePpSensitivity.FixedValue = 3
              [Structure].Phyllochron.BasePhyllochron.FixedValue = 100
              [Leaf].ExtinctionCoeff.FixedValue = 0.8
          Cultivar Ararat
            Command:
              [Phenology].MinimumLeafNumber.FixedValue = 9
              [Phenology].VrnSensitivity.FixedValue = 7
              [Phenology].PpSensitivity.FixedValue = 3
              [Phenology].EarlyReproductivePpSensitivity.FixedValue = 3
              [Structure].Phyllochron.BasePhyllochron.FixedValue = 100
              [Leaf].ExtinctionCoeff.FixedValue = 0.8
        CultivarFolder Africa
          Cultivar HAR1685
            Command:
              [Phenology].MinimumLeafNumber.FixedValue = 7
              [Phenology].VrnSensitivity.FixedValue = 0
              [Phenology].PpSensitivity.FixedValue = 3
              [Structure].Phyllochron.BasePhyllochron.FixedValue = 100
              [Grain].NumberFunction.GrainNumber.GrainsPerGramOfStem.FixedValue = 17
              [Phenology].GrainFilling.Target.FixedValue = 350
        CultivarFolder Iran
          Cultivar Gorgan
            Command:
              [Phenology].MinimumLeafNumber.FixedValue = 7
              [Phenology].VrnSensitivity.FixedValue = 0
              [Phenology].PpSensitivity.FixedValue = 4
              [Structure].Phyllochron.BasePhyllochron.FixedValue = 100
  DataStore
  Experiment 15TraitMod
    Factors
      Factor Cultivar: Specifications=[Sowing]
        Operations hartog
          2015-05-21  [wheat].Sow(cultivar:"hartog", population:150, depth:40, rowSpacing:250);
    Simulation 15TraitMod1
      Weather: FileName=gatton-15-g3.met
      Clock: StartDate=2015-05-19; EndDate=2015-11-17T01:00:00
      Summary
      SoilArbitrator
      Zone Field: Area=1; Slope=0
        Irrigation
        Fertiliser
        Soil: SoilType=Black Vertosol; Site=Lawes; NearestTown=Lawes, Q 4343; Region=Lockyer; State=Queensland; Country=Australia; NaturalVegetation=Blue Gum, Moreton Bay Ash, Tea Tree; ApsoilNumber=38; Latitude=-27.537; Longitude=152.336; LocationAccuracy=+-20m; DataSource=CSIRO Sustainable Ecosystems, Toowoomba
          Comments=Soil naming structure: \State\Region\Classification-Local Name (Site/district and locator number); oc and ph estimated
          Water
            Thickness  BD    AirDry  LL15  DUL   SAT
            150        1.32  0.13    0.26  0.41  0.47
            150        1.3   0.208   0.26  0.43  0.48
            300        1.23  0.26    0.26  0.46  0.51
            300        1.27  0.26    0.26  0.44  0.49
            300        1.37  0.25    0.25  0.4   0.45
            300        1.35  0.26    0.26  0.41  0.46
            300        1.35  0.26    0.26  0.38  0.46
            SoilCrop WheatSoil: LL=[0.26, 0.26, 0.26, 0.26, 0.25, 0.29, 0.36]; KL=[0.06, 0.06, 0.06, 0.04, 0.04, 0.02, 0.02]; XF=[1, 1, 1, 1, 1, 1, 1]
          SoilWater: SummerDate=1-Nov; SummerU=6; SummerCona=3.5; WinterDate=1-Apr; WinterU=4; WinterCona=2.5; DiffusConst=40; DiffusSlope=16; Salb=0.12; CN2Bare=73; CNRed=20; CNCov=0.8; max_pond=0; Thickness=[150, 150, 300, 300, 300, 300, 300]; SWCON=[0.3, 0.3, 0.3, 0.3, 0.3, 0.3, 0.3]; residueinterception=0
          SoilNitrogen: fom_type=[default, manure, mucuna, lablab, shemp, stable]; fract_carb=[0.2, 0.3, 0.54, 0.57, 0.45, 0]; fract_cell=[0.7, 0.3, 0.37, 0.37, 0.47, 0.1]; fract_lign=[0.1, 0.4, 0.09, 0.06, 0.08, 0.9]
          SoilOrganicMatter: RootCN=40; RootWt=1000; SoilCN=12; EnrACoeff=7.4; EnrBCoeff=0.2; OCUnits=Total
            Thickness  OC        FBiom  FInert
            150        0.953846  0.04   0.4
            150        0.953846  0.02   0.6
            300        0.961538  0.02   0.8
            300        0.846154  0.02   1
            300        0.546154  0.01   1
            300        0.261538  0.01   1
            300        0.2       0.01   1
          Analysis: Thickness=[150, 150, 300, 300, 300, 300, 300]; PH=[8, 8, 8, 8, 8, 8, 8]; PHUnits=Water; BoronUnits=HotWater
          InitialWater: PercentMethod=FilledFromTop; FractionFull=1; RelativeTo=LL15
          Sample Initial nitrogen: NO3Units=kgha; NH4Units=kgha; SWUnits=Volumetric; OCUnits=Total; PHUnits=Water
            Thickness  NO3  NH4
            150        20   1
            150        20   1
            300        10   1
            300        3    1
            300        2    1
            300        1    1
            300        1    1
          CERESSoilTemperature
        SurfaceOrganicMatter: PoolName=wheat_stubble; type=Wheat; mass=0; standing_fraction=0; cpr=0; cnr=80; CriticalResidueWeight=2000; OptimumDecompTemp=20; MaxCumulativeEOS=20; CNRatioDecompCoeff=0.277; CNRatioDecompThreshold=25; TotalLeachRain=25; MinRainToLeach=10; CriticalMinimumOrganicC=0.004; DefaultCPRatio=0; DefaultStandingFraction=0; StandingExtinctCoeff=0.5; FractionFaecesAdded=0.5
          Pools:
            {PoolName=wheat_stubble, ResidueType=Wheat, Mass=0, CNRatio=80, CPRatio=0, StandingFraction=0}
          ResidueTypes: LoadFromResource=ResidueTypes
        Plant Wheat: ResourceName=wheat; CropType=Wheat
        Operations Sowing
          2015-05-21  [wheat].Sow(cultivar:"ega_gregory", population:150, depth:50, rowSpacing:250);
        MicroClimate: a_interception=0; b_interception=1; c_interception=0; d_interception=0; soil_albedo=0.3; sun_angle=15; soil_heat_flux_fraction=0.4; night_interception_fraction=0.5; refheight=2; albedo=0.15; emissivity=0.96; RadIntTotal=0
        Operations Management
          2015-05-21  [Fertiliser].Apply(Amount: 205, Type: Fertiliser.Types.Urea);
          2015-05-22  [Irrigation].Apply(amount:24);
          2015-06-26  [Irrigation].Apply(amount:25);
          2015-07-14  [Irrigation].Apply(amount:26);
          2015-07-31  [Irrigation].Apply(amount:26);
          2015-08-14  [Irrigation].Apply(amount:25);
          2015-08-26  [Irrigation].Apply(amount:25);
          2015-09-09  [Irrigation].Apply(amount:25);
        Report: EventNames=[Clock].DoReport
          VariableNames:
            [Clock].Today
            [Wheat].Phenology.DaysAfterSowing
            [Wheat].Phenology.CurrentPhaseName
            [Wheat].Phenology.Stage
            [Wheat].Phenology.Zadok.Stage
            [Wheat].AboveGround.Wt
            [Wheat].Leaf.LAI
            [Wheat].Leaf.Live.Wt
            [Wheat].Leaf.CoverGreen
            [Wheat].Leaf.CoverTotal
            [Wheat].Spike.Wt
            [Wheat].Stem.Live.Wt
            [Wheat].Structure.TotalStemPopn
            [Wheat].Structure.MainStemPrimordiaNo
            [Wheat].Structure.LeafTipsAppeared
            [Wheat].Structure.PlantTotalNodeNo
            [Wheat].Grain.Number
            [Wheat].Grain.Wt
            [Wheat].WaterSupplyDemandRatio
            [Wheat].Leaf.SpecificArea
        SoluteManager
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